# OpenSim document version 40600
Model lenhart2015:
  gravity: 0 -9.80665 0
  length_units: m
  force_units: N
  credits:
    Lenhart, R. L., Kaiser, J., Smith, C. R., Thelen, D. G. Details of the model development are listed in the publication. A knee model with 6 DOF tibiofemoral and patellofemoral joints was built from MRI. Ligaments and cartilage contact are explicitly represented with force components. The knee model is integrated into a full body model based on the Arnold, Ann Biomed Eng, 2011 model. Some modifications to the lower extremity muscle paths and properties were made to improve computaitonal performance and enable simulations of dynamic tasks. In the SIMM to OpenSim conversion, the two patella frames were replaced with a single frame located at the patella COM.
  publications:
    Lenhart, R. L., Kaiser, J., Smith, C. R., Thelen, D. G. (2015). Prediction and validation of load-dependent behavior of the tibiofemoral and patellofemoral joints during movement. Annals of biomedical engineering, 43(11), 2675-2685.
  Ground
  BodySet:
    Body pelvis: mass=6.841478 [kg] mass_center=(-0.1067897 -0.02735758 0)
        inertia=(0.04409334 0.05004344 0.05493027 0 0 0) meshes=(pelvis.vtp pelvflip.vtp sacrum.vtp)
      WrapEllipsoid PS_at_brim_r: translation=(-0.09542911 -0.06935905 0.07844799) quadrant=all
          dimensions=(0.06218438 0.05217837 0.08490559)
      WrapEllipsoid IL_at_brim_r: translation=(-0.08191596 -0.05907185 0.09040652) quadrant=all
          dimensions=(0.06565235 0.07052564 0.08490559)
      WrapEllipsoid Gmax_at_pelvis_r: xyz_body_rotation=(-0.637045 0.383623 -0.684867)
          translation=(-0.09507035 -0.08749421 0.07952425) quadrant=all dimensions=(0.04540479 0.04663391 0.06938162)
      WrapEllipsoid PS_at_brim_l: translation=(-0.09542911 -0.06935905 -0.07844799) quadrant=all
          dimensions=(0.06218438 0.05217837 0.08490559)
      WrapEllipsoid IL_at_brim_l: translation=(-0.08191596 -0.05907185 -0.09040652) quadrant=all
          dimensions=(0.06565235 0.07052564 0.08490559)
      WrapEllipsoid Gmax_at_pelvis_l: xyz_body_rotation=(0.637045 -0.383623 -0.684867)
          translation=(-0.09507035 -0.08749421 -0.07952425) quadrant=all dimensions=(0.04540479 0.04663391 0.06938162)
    Body femur_r: mass=8.274697 mass_center=(0 -0.1500353 0) inertia=(0.1202326 0.02466058 0.1202326 0 0 0)
      WrapEllipsoid AB_at_femshaft_r: xyz_body_rotation=(0.111701 0 0.176278)
          translation=(0.01350921 -0.1084004 0.02356439) quadrant=all dimensions=(0.0152661 0.06476529 0.01942959)
      WrapEllipsoid AL_at_femshaft_r: xyz_body_rotation=(0.111701 0 0.0541052)
          translation=(0.02855899 -0.2201927 0.01102481) quadrant=all dimensions=(0.01859689 0.09252184 0.01665393)
      WrapEllipsoid AMprox_at_femshaft_r: xyz_body_rotation=(0.111701 0 0.211185)
          translation=(0.005585007 -0.07179482 0.02767032) quadrant=all dimensions=(0.01952211 0.06476529 0.02960699)
      WrapEllipsoid AMmid_at_femshaft_r: xyz_body_rotation=(0.111701 0 0.123918)
          translation=(0.02129159 -0.1486928 0.01904488) quadrant=all dimensions=(0.01979967 0.1110262 0.02868177)
      WrapEllipsoid AMdist_at_femshaft_r: xyz_body_rotation=(0.111701 0 0.176278)
          translation=(0.02841077 -0.2412683 0.008660895) quadrant=all dimensions=(0.02016976 0.1850437 0.01989219)
      WrapEllipsoid AMisch_at_condyles_r: xyz_body_rotation=(0.111701 0 -0.434587)
          translation=(-0.02650482 -0.3488008 -0.003400881) quadrant=all dimensions=(0.04626092 0.2220524 0.03719378)
      WrapEllipsoid PECT_at_femshaft_r: xyz_body_rotation=(0.111701 0 0.211185)
          translation=(0.007051431 -0.07891789 0.02687139) quadrant=all dimensions=(0.01535862 0.04626092 0.01212036)
      WrapCylinder KnExt_at_fem_r: translation=(0.009252184 -0.3673117 0) quadrant=x radius=0.02590611 length=0.1850437
      WrapCylinder KnExt_vasint_at_fem_r: translation=(0.009252184 -0.3673117 0) quadrant=x radius=0.02405568
          length=0.1850437
      WrapEllipsoid Gastroc_at_Condyles_r: xyz_body_rotation=(0.0589921 -0.0872665 0.0232129)
          translation=(0.009252184 -0.3770265 0.0002775655) quadrant=all dimensions=(0.02775655 0.02313046 0.1387828)
    Body femur_distal_r: mass=0.008166491 mass_center=(0 0 0) inertia=(0.0008166491 0.0008166491 0.0008166491 0 0 0)
        meshes=(lenhart2015-R-femur-bone.stl lenhart2015-R-femur-cartilage.stl)
      WrapCylinder Capsule_r: xyz_body_rotation=(-0.0299066 0.02 0.331613) translation=(-0.004 -0.003 0) quadrant=all
          radius=0.018 length=0.5
    Body patella_r: mass=0.3981164 mass_center=(0 0 0) inertia=(1.306639e-5 6.043203e-5 6.043203e-5 0 0 0)
        meshes=(lenhart2015-R-patella-bone.stl lenhart2015-R-patella-cartilage.stl)
      WrapEllipsoid PatTen_r: xyz_body_rotation=(0 0 0.01) translation=(0.0005 -0.009389232 0.00048233) quadrant=all
          dimensions=(0.005 0.008 0.012)
    Body tibia_proximal_r: mass=0.008166491 mass_center=(0 0 0) inertia=(0.0008166491 0.0008166491 0.0008166491 0 0 0)
        meshes=(lenhart2015-R-tibia-bone.stl lenhart2015-R-tibia-cartilage.stl lenhart2015-R-fibula-bone.stl)
      WrapEllipsoid Med_Lig_r: xyz_body_rotation=(-0.104907 -0.0349066 0.181613) translation=(0.001 -0.0346 -0.0187)
          quadrant=all dimensions=(0.03 0.018 0.012)
      WrapEllipsoid Med_LigP_r: xyz_body_rotation=(-0.139813 0.349066 0.181613) translation=(-0.0104 -0.0314 -0.0227)
          quadrant=all dimensions=(0.025 0.0054 0.0053)
    Body tibia_r: mass=2.652068 mass_center=(0 -0.1731325 0) inertia=(0.02490538 0.004281378 0.0259282 0 0 0)
      WrapEllipsoid GR_at_condyles_r: xyz_body_rotation=(0 0 -0.18326) translation=(0 0 0) quadrant=all
          dimensions=(0.03629761 0.06402494 0.05374062)
      WrapEllipsoid SM_at_condyles_r: xyz_body_rotation=(0 0 -0.296706) translation=(0 0 0) quadrant=all
          dimensions=(0.03549099 0.06069766 0.04930425)
      WrapEllipsoid ST_at_condyles_r: xyz_body_rotation=(0 0 -0.270526) translation=(0 0 0) quadrant=all
          dimensions=(0.04285134 0.06957041 0.05767286)
      WrapCylinder BFLH_at_gastroc_r: translation=(-0.03186123 -0.04466622 0) quadrant=y radius=0.01008267
          length=0.1008267
      WrapCylinder Gastroc_at_Shank_r: xyz_body_rotation=(2.96723 0.0289725 -1.47812)
          translation=(-0.007461174 -0.07461174 -0.00332728) quadrant=-y radius=0.05545467 length=0.1008267
    Body talus_r: mass=0.03674921 mass_center=(0.005545467 0.002319014 0)
        inertia=(2.490621e-6 8.302071e-7 2.490621e-6 0 0 0) meshes=talus_rv.vtp
    Body calcn_r: mass=1.008562 mass_center=(0.1027071 0.01572896 0)
        inertia=(0.001053533 0.002680739 0.003108295 0 0 0)
        meshes=(calcaneous_rv.vtp navicular_rv.vtp cuboid_rv.vtp first_cuneiform_rv.vtp second_cuneiform_rv.vtp third_cuneiform_rv.vtp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)
    Body toes_r: mass=0.1612882 mass_center=(0.03095379 -0.002621494 0.0105868)
        inertia=(0.0001677018 0.0004292171 0.0004939732 0 0 0)
        meshes=(prox_phalanx1_rvs.vtp prox_phalanx2_rvs.vtp prox_phalanx3_rvs.vtp prox_phalanx4_rvs.vtp prox_phalanx5_rvs.vtp mid_phalanx2_rvs.vtp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)
    Body femur_l: mass=8.274697 mass_center=(0 -0.1500353 0) inertia=(0.1202326 0.02466058 0.1202326 0 0 0)
      WrapEllipsoid AB_at_femshaft_l: xyz_body_rotation=(-0.111701 0 0.176278)
          translation=(0.01350921 -0.1084004 -0.02356439) quadrant=all dimensions=(0.0152661 0.06476529 0.01942959)
      WrapEllipsoid AL_at_femshaft_l: xyz_body_rotation=(-0.111701 0 0.0541052)
          translation=(0.02855899 -0.2201927 -0.01102481) quadrant=all dimensions=(0.01859689 0.09252184 0.01665393)
      WrapEllipsoid AMprox_at_femshaft_l: xyz_body_rotation=(-0.111701 0 0.211185)
          translation=(0.005585007 -0.07179482 -0.02767032) quadrant=all dimensions=(0.01952211 0.06476529 0.02960699)
      WrapEllipsoid AMmid_at_femshaft_l: xyz_body_rotation=(-0.111701 0 0.123918)
          translation=(0.02129159 -0.1486928 -0.01904488) quadrant=all dimensions=(0.01979967 0.1110262 0.02868177)
      WrapEllipsoid AMdist_at_femshaft_l: xyz_body_rotation=(-0.111701 0 0.176278)
          translation=(0.02841077 -0.2412683 -0.008660895) quadrant=all dimensions=(0.02016976 0.1850437 0.01989219)
      WrapEllipsoid AMisch_at_condyles_l: xyz_body_rotation=(-0.111701 0 -0.434587)
          translation=(-0.02650482 -0.3488008 0.003400881) quadrant=all dimensions=(0.04626092 0.2220524 0.03719378)
      WrapEllipsoid PECT_at_femshaft_l: xyz_body_rotation=(-0.111701 0 0.211185)
          translation=(0.007051431 -0.07891789 -0.02687139) quadrant=all dimensions=(0.01535862 0.04626092 0.01212036)
      WrapCylinder KnExt_at_fem_l: translation=(0.009252184 -0.3673117 0) quadrant=all radius=0.02590611
          length=0.1850437
      WrapCylinder KnExt_vasint_at_fem_l: translation=(0.009252184 -0.3673117 0) quadrant=x radius=0.02405568
          length=0.1850437
      WrapEllipsoid Gastroc_at_Condyles_l: xyz_body_rotation=(-0.0589921 -0.0872665 0.0232129)
          translation=(0.009252184 -0.3770265 -0.0002775655) quadrant=all dimensions=(0.02775655 0.02313046 0.1387828)
    Body femur_distal_l: mass=0.008166491 mass_center=(0 0 0) inertia=(0.0008166491 0.0008166491 0.0008166491 0 0 0)
        meshes=(lenhart2015-L-femur-bone.stl lenhart2015-L-femur-cartilage.stl)
      WrapCylinder Capsule_l: xyz_body_rotation=(0.0299066 0.02 0.331613) translation=(-0.004 -0.003 0) quadrant=all
          radius=0.018 length=0.5
    Body patella_l: mass=0.3981164 mass_center=(0 0 0) inertia=(1.306639e-5 6.043203e-5 6.043203e-5 0 0 0)
        meshes=(lenhart2015-L-patella-bone.stl lenhart2015-L-patella-cartilage.stl)
      WrapEllipsoid PatTen_l: xyz_body_rotation=(0 0 0.01) translation=(0.0005 -0.009389232 -0.00048233) quadrant=all
          dimensions=(0.005 0.008 0.012)
    Body tibia_proximal_l: mass=0.008166491 mass_center=(0 0 0) inertia=(0.0008166491 0.0008166491 0.0008166491 0 0 0)
        meshes=(lenhart2015-L-tibia-bone.stl lenhart2015-L-tibia-cartilage.stl lenhart2015-L-fibula-bone.stl)
      WrapEllipsoid Med_Lig_l: xyz_body_rotation=(0.104907 -0.0349066 0.181613) translation=(0.001 -0.0346 0.0187)
          quadrant=all dimensions=(0.03 0.018 0.012)
      WrapEllipsoid Med_LigP_l: xyz_body_rotation=(0.139813 0.349066 0.181613) translation=(-0.0104 -0.0314 0.0227)
          quadrant=all dimensions=(0.025 0.0054 0.0053)
    Body tibia_l: mass=2.652068 mass_center=(0 -0.1731325 0) inertia=(0.02490538 0.004281378 0.0259282 0 0 0)
      WrapEllipsoid GR_at_condyles_l: xyz_body_rotation=(0 0 -0.18326) translation=(0 0 0) quadrant=all
          dimensions=(0.03629761 0.06402494 0.05374062)
      WrapEllipsoid SM_at_condyles_l: xyz_body_rotation=(0 0 -0.296706) translation=(0 0 0) quadrant=all
          dimensions=(0.03549099 0.06069766 0.04930425)
      WrapEllipsoid ST_at_condyles_l: xyz_body_rotation=(0 0 -0.270526) translation=(0 0 0) quadrant=all
          dimensions=(0.04285134 0.06957041 0.05767286)
      WrapCylinder BFLH_at_gastroc_l: translation=(-0.03186123 -0.04466622 0) quadrant=y radius=0.01008267
          length=0.1008267
      WrapCylinder Gastroc_at_Shank_l: xyz_body_rotation=(-2.96723 -0.0289725 -1.47812)
          translation=(-0.007461174 -0.07461174 0.00332728) quadrant=-y radius=0.05545467 length=0.1008267
    Body talus_l: mass=0.03674921 mass_center=(0.005545467 0.002319014 0)
        inertia=(2.490621e-6 8.302071e-7 2.490621e-6 0 0 0) meshes=talus_lv.vtp
    Body calcn_l: mass=1.008562 mass_center=(0.1027071 0.01572896 0)
        inertia=(0.001053533 0.002680739 0.003108295 0 0 0)
        meshes=(calcaneous_lv.vtp navicular_lv.vtp cuboid_lv.vtp first_cuneiform_lv.vtp second_cuneiform_lv.vtp third_cuneiform_lv.vtp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)
    Body toes_l: mass=0.1612882 mass_center=(0.03095379 -0.002621494 -0.0105868)
        inertia=(0.0001677018 0.0004292171 0.0004939732 0 0 0)
        meshes=(prox_phalanx1_lvs.vtp prox_phalanx2_lvs.vtp prox_phalanx3_lvs.vtp prox_phalanx4_lvs.vtp prox_phalanx5_lvs.vtp mid_phalanx2_lvs.vtp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)
    Body torso: mass=19.7772 mass_center=(0 0.2052605 0) inertia=(0.3599961 0.2261073 0.4871402 0 0 0)
        meshes=(lumbar1sm.vtp lumbar2sm.vtp lumbar3sm.vtp lumbar4sm.vtp lumbar5.vtp ribcage_s.vtp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)
    Body neckhead: mass=4.250659 mass_center=(0.02305236 0.1292701 0) inertia=(0.01594293 0.01094569 0.01475209 0 0 0)
        meshes=(cerv1sm.vtp cerv2sm.vtp cerv3sm.vtp cerv4sm.vtp cerv5sm.vtp cerv6sm.vtp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)
    Body humerus_r: mass=1.659839 mass_center=(0 -0.1512731 0) inertia=(0.008249713 0.002845896 0.009260037 0 0 0)
        meshes=humerus_rv.vtp
    Body ulna_r: mass=0.4961143 mass_center=(0 -0.1012285 0) inertia=(0.001706366 0.0003560209 0.001850963 0 0 0)
        meshes=ulna_rv.vtp
    Body radius_r: mass=0.4961143 mass_center=(0 -0.1012285 0) inertia=(0.001706366 0.0003560209 0.001850963 0 0 0)
        meshes=radius_rv.vtp
    Body hand_r: mass=0.373617 mass_center=(0 -0.05719275 0) inertia=(0.0005138684 0.0003151189 0.0007719548 0 0 0)
        meshes=(pisiform_rvs.vtp lunate_rvs.vtp scaphoid_rvs.vtp triquetrum_rvs.vtp hamate_rvs.vtp capitate_rvs.vtp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)
    Body humerus_l: mass=1.659839 mass_center=(0 -0.1512731 0) inertia=(0.008249713 0.002845896 0.009260037 0 0 0)
        meshes=humerus_lv.vtp
    Body ulna_l: mass=0.4961143 mass_center=(0 -0.1012285 0) inertia=(0.001706366 0.0003560209 0.001850963 0 0 0)
        meshes=ulna_lv.vtp
    Body radius_l: mass=0.4961143 mass_center=(0 -0.1012285 0) inertia=(0.001706366 0.0003560209 0.001850963 0 0 0)
        meshes=radius_lv.vtp
    Body hand_l: mass=0.373617 mass_center=(0 -0.05719275 0) inertia=(0.0005138684 0.0003151189 0.0007719548 0 0 0)
        meshes=(pisiform_lvs.vtp lunate_lvs.vtp scaphoid_lvs.vtp triquetrum_lvs.vtp hamate_lvs.vtp capitate_lvs.vtp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)
  JointSet:
    CustomJoint gnd_pelvis: socket_parent_frame=/ground socket_child_frame=/bodyset/pelvis
      Coordinate pelvis_tilt: default_value=0 range=(-4.712389 4.712389) clamped=false
      Coordinate pelvis_list: default_value=0 range=(-4.712389 4.712389) clamped=false
      Coordinate pelvis_rot: default_value=0 range=(-4.712389 4.712389) clamped=false
      Coordinate pelvis_tx: default_value=0 range=(-10 10) clamped=false
      Coordinate pelvis_ty: default_value=0.969 range=(-10 10) clamped=false
      Coordinate pelvis_tz: default_value=0 range=(-10 10) clamped=false
      SpatialTransform:
        TransformAxis rotation1: coordinates=pelvis_tilt axis=(0 0 1) LinearFunction(coefficients=1 0)
        TransformAxis rotation2: coordinates=pelvis_list axis=(1 0 0) LinearFunction(coefficients=1 0)
        TransformAxis rotation3: coordinates=pelvis_rot axis=(0 1 0) LinearFunction(coefficients=1 0)
        TransformAxis translation1: coordinates=pelvis_tx axis=(1 0 0) LinearFunction(coefficients=1 0)
        TransformAxis translation2: coordinates=pelvis_ty axis=(0 1 0) LinearFunction(coefficients=1 0)
        TransformAxis translation3: coordinates=pelvis_tz axis=(0 0 1) LinearFunction(coefficients=1 0)
    CustomJoint hip_r: socket_parent_frame=pelvis_offset socket_child_frame=/bodyset/femur_r
      Coordinate hip_flex_r: default_value=0 range=(-1.047198 2.617994) clamped=true
      Coordinate hip_add_r: default_value=0 range=(-1.047198 1.047198) clamped=true
      Coordinate hip_rot_r: default_value=0 range=(-1.047198 1.047198) clamped=true
      PhysicalOffsetFrame pelvis_offset: socket_parent=/bodyset/pelvis
          translation=(-0.06729785 -0.08324146 0.09239164) [meters]
      SpatialTransform: axes_held_at_zero=(translation1 translation2 translation3)
        TransformAxis rotation1: coordinates=hip_flex_r axis=(0 0 1) LinearFunction(coefficients=1 0)
        TransformAxis rotation2: coordinates=hip_add_r axis=(1 0 0) LinearFunction(coefficients=1 0)
        TransformAxis rotation3: coordinates=hip_rot_r axis=(0 1 0) LinearFunction(coefficients=1 0)
    WeldJoint femur_femur_distal_r: socket_parent_frame=femur_r_offset socket_child_frame=/bodyset/femur_distal_r
      PhysicalOffsetFrame femur_r_offset: socket_parent=/bodyset/femur_r
          translation=(-0.005551356 -0.3741814 -0.001170623)
    CustomJoint pf_r: socket_parent_frame=/bodyset/femur_distal_r socket_child_frame=/bodyset/patella_r
      Coordinate pf_flex_r: default_value=0 range=(-1.570796 1.570796) clamped=true
      Coordinate pf_rot_r: default_value=0 range=(-1.570796 1.570796) clamped=true
      Coordinate pf_tilt_r: default_value=0 range=(-0.8726646 0.8726646) clamped=true
      Coordinate pf_tx_r: default_value=0.053 range=(-0.2 0.2) clamped=true
      Coordinate pf_ty_r: default_value=0.005 range=(-0.2 0.2) clamped=true
      Coordinate pf_tz_r: default_value=0.004 range=(-0.2 0.2) clamped=true
      SpatialTransform:
        TransformAxis rotation1: coordinates=pf_flex_r axis=(0 0 1) LinearFunction(coefficients=-1 0)
        TransformAxis rotation2: coordinates=pf_rot_r axis=(1 0 0) LinearFunction(coefficients=1 0)
        TransformAxis rotation3: coordinates=pf_tilt_r axis=(0 1 0) LinearFunction(coefficients=1 0)
        TransformAxis translation1: coordinates=pf_tx_r axis=(1 0 0) LinearFunction(coefficients=1 0)
        TransformAxis translation2: coordinates=pf_ty_r axis=(0 1 0) LinearFunction(coefficients=1 0)
        TransformAxis translation3: coordinates=pf_tz_r axis=(0 0 1) LinearFunction(coefficients=1 0)
    CustomJoint knee_r: socket_parent_frame=/bodyset/femur_distal_r socket_child_frame=/bodyset/tibia_proximal_r
      Coordinate knee_flex_r: default_value=0 range=(-0.1745329 2.792527) clamped=true
      Coordinate knee_add_r: default_value=0 range=(-0.8726646 0.8726646) clamped=true
      Coordinate knee_rot_r: default_value=0 range=(-0.8726646 0.8726646) clamped=true
      Coordinate knee_tx_r: default_value=0 range=(-0.2 0.2) clamped=true
      Coordinate knee_ty_r: default_value=0 range=(-0.2 0.2) clamped=true
      Coordinate knee_tz_r: default_value=0 range=(-0.2 0.2) clamped=true
      SpatialTransform:
        TransformAxis rotation1: coordinates=knee_flex_r axis=(0 0 1) LinearFunction(coefficients=-1 0)
        TransformAxis rotation2: coordinates=knee_add_r axis=(1 0 0) LinearFunction(coefficients=1 0)
        TransformAxis rotation3: coordinates=knee_rot_r axis=(0 1 0) LinearFunction(coefficients=1 0)
        TransformAxis translation1: coordinates=knee_tx_r axis=(1 0 0) LinearFunction(coefficients=1 0)
        TransformAxis translation2: coordinates=knee_ty_r axis=(0 1 0) LinearFunction(coefficients=1 0)
        TransformAxis translation3: coordinates=knee_tz_r axis=(0 0 1) LinearFunction(coefficients=1 0)
    WeldJoint tibia_tibia_proximal_r: socket_parent_frame=tibia_proximal_r_offset socket_child_frame=/bodyset/tibia_r
      PhysicalOffsetFrame tibia_proximal_r_offset: socket_parent=/bodyset/tibia_proximal_r translation=(0.006 0 0)
    CustomJoint ankle_r: socket_parent_frame=tibia_r_offset socket_child_frame=/bodyset/talus_r
      Coordinate ankle_flex_r: default_value=0 range=(-1.570796 1.570796) clamped=true
      PhysicalOffsetFrame tibia_r_offset: socket_parent=/bodyset/tibia_r translation=(-0.01008267 -0.4033067 0)
      SpatialTransform: axes_held_at_zero=(rotation2 rotation3 translation1 translation2 translation3)
        TransformAxis rotation1: coordinates=ankle_flex_r axis=(-0.105014 -0.1740221 0.9791263)
            LinearFunction(coefficients=1 0)
    CustomJoint subtalar_r: socket_parent_frame=talus_r_offset socket_child_frame=/bodyset/calcn_r
      Coordinate subt_angle_r: default_value=0 range=(-1.047198 1.047198) clamped=true
      PhysicalOffsetFrame talus_r_offset: socket_parent=/bodyset/talus_r
          translation=(-0.04917317 -0.04229679 0.007985473)
      SpatialTransform: axes_held_at_zero=(rotation2 rotation3 translation1 translation2 translation3)
        TransformAxis rotation1: coordinates=subt_angle_r axis=(0.78718 0.604747 -0.120949)
            LinearFunction(coefficients=1 0)
    CustomJoint mtp_r: socket_parent_frame=calcn_r_offset socket_child_frame=/bodyset/toes_r
      Coordinate mtp_angle_r: default_value=0 range=(-1.047198 1.047198) clamped=true
      PhysicalOffsetFrame calcn_r_offset: socket_parent=/bodyset/calcn_r
          translation=(0.1802781 -0.002016534 0.001088928)
      SpatialTransform: axes_held_at_zero=(rotation2 rotation3 translation1 translation2 translation3)
        TransformAxis rotation1: coordinates=mtp_angle_r axis=(0.5809542 0 -0.8139363) LinearFunction(coefficients=1 0)
    CustomJoint hip_l: socket_parent_frame=pelvis_offset socket_child_frame=/bodyset/femur_l
      Coordinate hip_flex_l: default_value=0 range=(-1.047198 2.617994) clamped=true
      Coordinate hip_add_l: default_value=0 range=(-1.047198 1.047198) clamped=true
      Coordinate hip_rot_l: default_value=0 range=(-1.047198 1.047198) clamped=true
      PhysicalOffsetFrame pelvis_offset: socket_parent=/bodyset/pelvis
          translation=(-0.06729785 -0.08324146 -0.09239164)
      SpatialTransform: axes_held_at_zero=(translation1 translation2 translation3)
        TransformAxis rotation1: coordinates=hip_flex_l axis=(0 0 1) LinearFunction(coefficients=1 0)
        TransformAxis rotation2: coordinates=hip_add_l axis=(1 0 0) LinearFunction(coefficients=1 0)
        TransformAxis rotation3: coordinates=hip_rot_l axis=(0 1 0) LinearFunction(coefficients=1 0)
    WeldJoint femur_femur_distal_l: socket_parent_frame=femur_l_offset socket_child_frame=/bodyset/femur_distal_l
      PhysicalOffsetFrame femur_l_offset: socket_parent=/bodyset/femur_l
          translation=(-0.005551356 -0.3741814 0.001170623)
    CustomJoint pf_l: socket_parent_frame=/bodyset/femur_distal_l socket_child_frame=/bodyset/patella_l
      Coordinate pf_flex_l: default_value=0 range=(-1.570796 1.570796) clamped=true
      Coordinate pf_rot_l: default_value=0 range=(-1.570796 1.570796) clamped=true
      Coordinate pf_tilt_l: default_value=0 range=(-0.8726646 0.8726646) clamped=true
      Coordinate pf_tx_l: default_value=0.053 range=(-0.2 0.2) clamped=true
      Coordinate pf_ty_l: default_value=0.005 range=(-0.2 0.2) clamped=true
      Coordinate pf_tz_l: default_value=0.004 range=(-0.2 0.2) clamped=true
      SpatialTransform:
        TransformAxis rotation1: coordinates=pf_flex_l axis=(0 0 1) LinearFunction(coefficients=-1 0)
        TransformAxis rotation2: coordinates=pf_rot_l axis=(1 0 0) LinearFunction(coefficients=1 0)
        TransformAxis rotation3: coordinates=pf_tilt_l axis=(0 1 0) LinearFunction(coefficients=1 0)
        TransformAxis translation1: coordinates=pf_tx_l axis=(1 0 0) LinearFunction(coefficients=1 0)
        TransformAxis translation2: coordinates=pf_ty_l axis=(0 1 0) LinearFunction(coefficients=1 0)
        TransformAxis translation3: coordinates=pf_tz_l axis=(0 0 1) LinearFunction(coefficients=1 0)
    CustomJoint knee_l: socket_parent_frame=/bodyset/femur_distal_l socket_child_frame=/bodyset/tibia_proximal_l
      Coordinate knee_flex_l: default_value=0 range=(-0.1745329 2.792527) clamped=true
      Coordinate knee_add_l: default_value=0 range=(-0.8726646 0.8726646) clamped=true
      Coordinate knee_rot_l: default_value=0 range=(-0.8726646 0.8726646) clamped=true
      Coordinate knee_tx_l: default_value=0 range=(-0.2 0.2) clamped=true
      Coordinate knee_ty_l: default_value=0 range=(-0.2 0.2) clamped=true
      Coordinate knee_tz_l: default_value=0 range=(-0.2 0.2) clamped=true
      SpatialTransform:
        TransformAxis rotation1: coordinates=knee_flex_l axis=(0 0 1) LinearFunction(coefficients=-1 0)
        TransformAxis rotation2: coordinates=knee_add_l axis=(1 0 0) LinearFunction(coefficients=1 0)
        TransformAxis rotation3: coordinates=knee_rot_l axis=(0 1 0) LinearFunction(coefficients=1 0)
        TransformAxis translation1: coordinates=knee_tx_l axis=(1 0 0) LinearFunction(coefficients=1 0)
        TransformAxis translation2: coordinates=knee_ty_l axis=(0 1 0) LinearFunction(coefficients=1 0)
        TransformAxis translation3: coordinates=knee_tz_l axis=(0 0 1) LinearFunction(coefficients=1 0)
    WeldJoint tibia_tibia_proximal_l: socket_parent_frame=tibia_proximal_l_offset socket_child_frame=/bodyset/tibia_l
      PhysicalOffsetFrame tibia_proximal_l_offset: socket_parent=/bodyset/tibia_proximal_l translation=(0.006 0 0)
    CustomJoint ankle_l: socket_parent_frame=tibia_l_offset socket_child_frame=/bodyset/talus_l
      Coordinate ankle_flex_l: default_value=0 range=(-1.570796 1.570796) clamped=true
      PhysicalOffsetFrame tibia_l_offset: socket_parent=/bodyset/tibia_l translation=(-0.01008267 -0.4033067 0)
      SpatialTransform: axes_held_at_zero=(rotation2 rotation3 translation1 translation2 translation3)
        TransformAxis rotation1: coordinates=ankle_flex_l axis=(-0.105014 -0.1740221 -0.9791263)
            LinearFunction(coefficients=-1 0)
    CustomJoint subtalar_l: socket_parent_frame=talus_l_offset socket_child_frame=/bodyset/calcn_l
      Coordinate subt_angle_l: default_value=0 range=(-0.6981317 0.6981317) clamped=true
      PhysicalOffsetFrame talus_l_offset: socket_parent=/bodyset/talus_l
          translation=(-0.04917317 -0.04229679 -0.007985473)
      SpatialTransform: axes_held_at_zero=(rotation2 rotation3 translation1 translation2 translation3)
        TransformAxis rotation1: coordinates=subt_angle_l axis=(0.78718 0.604747 0.120949)
            LinearFunction(coefficients=-1 0)
    CustomJoint mtp_l: socket_parent_frame=calcn_l_offset socket_child_frame=/bodyset/toes_l
      Coordinate mtp_angle_l: default_value=0 range=(-1.047198 1.047198) clamped=true
      PhysicalOffsetFrame calcn_l_offset: socket_parent=/bodyset/calcn_l
          translation=(0.1802781 -0.002016534 -0.001088928)
      SpatialTransform: axes_held_at_zero=(rotation2 rotation3 translation1 translation2 translation3)
        TransformAxis rotation1: coordinates=mtp_angle_l axis=(0.5809542 0 0.8139363) LinearFunction(coefficients=-1 0)
    CustomJoint pelvis_torso: socket_parent_frame=pelvis_offset socket_child_frame=/bodyset/torso
      Coordinate lumbar_ext: default_value=0 range=(-1.047198 1.047198) clamped=true
      Coordinate lumbar_latbend: default_value=0 range=(-1.047198 1.047198) clamped=true
      Coordinate lumbar_rot: default_value=0 range=(-1.047198 1.047198) clamped=true
      PhysicalOffsetFrame pelvis_offset: socket_parent=/bodyset/pelvis translation=(-0.1195853 0.05832947 0)
      SpatialTransform: axes_held_at_zero=(translation1 translation2 translation3)
        TransformAxis rotation1: coordinates=lumbar_ext axis=(0 0 1) LinearFunction(coefficients=1 0)
        TransformAxis rotation2: coordinates=lumbar_latbend axis=(1 0 0) LinearFunction(coefficients=1 0)
        TransformAxis rotation3: coordinates=lumbar_rot axis=(0 1 0) LinearFunction(coefficients=1 0)
    CustomJoint torso_neckhead: socket_parent_frame=torso_offset socket_child_frame=/bodyset/neckhead
      Coordinate neck_ext: default_value=0 range=(-0.8726646 1.256637) clamped=true
      Coordinate neck_latbend: default_value=0 range=(-0.6981317 0.6981317) clamped=true
      Coordinate neck_rot: default_value=0 range=(-1.151917 1.151917) clamped=true
      PhysicalOffsetFrame torso_offset: socket_parent=/bodyset/torso translation=(-0.02299154 0.3593527 0)
      SpatialTransform: axes_held_at_zero=(translation1 translation2 translation3)
        TransformAxis rotation1: coordinates=neck_ext axis=(0 0 1) LinearFunction(coefficients=1 0)
        TransformAxis rotation2: coordinates=neck_latbend axis=(1 0 0) LinearFunction(coefficients=1 0)
        TransformAxis rotation3: coordinates=neck_rot axis=(0 1 0) LinearFunction(coefficients=1 0)
    CustomJoint acromial_r: socket_parent_frame=torso_offset socket_child_frame=/bodyset/humerus_r
      Coordinate arm_add_r: default_value=0 range=(-2.094395 1.570796) clamped=true
      Coordinate arm_flex_r: default_value=0 range=(-1.570796 1.570796) clamped=true
      Coordinate arm_rot_r: default_value=0 range=(-1.570796 1.570796) clamped=true
      PhysicalOffsetFrame torso_offset: socket_parent=/bodyset/torso translation=(-0.02553606 0.3333387 0.1843849)
      SpatialTransform: axes_held_at_zero=(translation1 translation2 translation3)
        TransformAxis rotation1: coordinates=arm_add_r axis=(1 0 0) LinearFunction(coefficients=1 0)
        TransformAxis rotation2: coordinates=arm_flex_r axis=(0 0 1) LinearFunction(coefficients=1 0)
        TransformAxis rotation3: coordinates=arm_rot_r axis=(0 1 0) LinearFunction(coefficients=1 0)
    CustomJoint elbow_r: socket_parent_frame=humerus_r_offset socket_child_frame=/bodyset/ulna_r
      Coordinate elbow_flex_r: default_value=0 range=(0 2.792527) clamped=true
      PhysicalOffsetFrame humerus_r_offset: socket_parent=/bodyset/humerus_r
          translation=(0.01208698 -0.2632515 -0.008823389)
      SpatialTransform: axes_held_at_zero=(rotation2 rotation3 translation1 translation2 translation3)
        TransformAxis rotation1: coordinates=elbow_flex_r axis=(0.226047 0.022269 0.9738618)
            LinearFunction(coefficients=1 0)
    CustomJoint radioulnar_r: socket_parent_frame=ulna_r_offset socket_child_frame=/bodyset/radius_r
      Coordinate pro_sup_r: default_value=1.047198 range=(0 1.570796) clamped=true
      PhysicalOffsetFrame ulna_r_offset: socket_parent=/bodyset/ulna_r
          translation=(-0.005649984 -0.01092453 0.02190702)
      SpatialTransform: axes_held_at_zero=(rotation1 rotation3 translation1 translation2 translation3)
        TransformAxis rotation2: coordinates=pro_sup_r axis=(0.05639803 0.9984065 0.001952001)
            LinearFunction(coefficients=1 0)
    CustomJoint radius_hand_r: socket_parent_frame=radius_r_offset socket_child_frame=/bodyset/hand_r
      Coordinate wrist_flex_r: default_value=0 range=(-1.22173 1.22173) clamped=true
      PhysicalOffsetFrame radius_r_offset: socket_parent=/bodyset/radius_r
          translation=(-0.00738857 -0.198082 0.01143099)
      SpatialTransform: axes_held_at_zero=(rotation2 rotation3 translation1 translation2 translation3)
        TransformAxis rotation1: coordinates=wrist_flex_r axis=(0 0 1) LinearFunction(coefficients=1 0)
    CustomJoint acromial_l: socket_parent_frame=torso_offset socket_child_frame=/bodyset/humerus_l
      Coordinate arm_add_l: default_value=0 range=(-2.094395 1.570796) clamped=true
      Coordinate arm_flex_l: default_value=0 range=(-1.570796 1.570796) clamped=true
      Coordinate arm_rot_l: default_value=0 range=(-1.570796 1.570796) clamped=true
      PhysicalOffsetFrame torso_offset: socket_parent=/bodyset/torso translation=(-0.02553606 0.3333387 -0.1843849)
      SpatialTransform: axes_held_at_zero=(translation1 translation2 translation3)
        TransformAxis rotation1: coordinates=arm_add_l axis=(-1 0 0) LinearFunction(coefficients=1 0)
        TransformAxis rotation2: coordinates=arm_flex_l axis=(0 0 1) LinearFunction(coefficients=1 0)
        TransformAxis rotation3: coordinates=arm_rot_l axis=(0 -1 0) LinearFunction(coefficients=1 0)
    CustomJoint elbow_l: socket_parent_frame=humerus_l_offset socket_child_frame=/bodyset/ulna_l
      Coordinate elbow_flex_l: default_value=0 range=(0 2.792527) clamped=true
      PhysicalOffsetFrame humerus_l_offset: socket_parent=/bodyset/humerus_l
          translation=(0.01208698 -0.2632515 0.008823389)
      SpatialTransform: axes_held_at_zero=(rotation2 rotation3 translation1 translation2 translation3)
        TransformAxis rotation1: coordinates=elbow_flex_l axis=(-0.226047 -0.022269 0.9738618)
            LinearFunction(coefficients=1 0)
    CustomJoint radioulnar_l: socket_parent_frame=ulna_l_offset socket_child_frame=/bodyset/radius_l
      Coordinate pro_sup_l: default_value=1.047198 range=(0 1.570796) clamped=true
      PhysicalOffsetFrame ulna_l_offset: socket_parent=/bodyset/ulna_l
          translation=(-0.005649984 -0.01092453 -0.02190702)
      SpatialTransform: axes_held_at_zero=(rotation1 rotation3 translation1 translation2 translation3)
        TransformAxis rotation2: coordinates=pro_sup_l axis=(-0.05639803 -0.9984065 0.001952001)
            LinearFunction(coefficients=1 0)
    CustomJoint radius_hand_l: socket_parent_frame=radius_l_offset socket_child_frame=/bodyset/hand_l
      Coordinate wrist_flex_l: default_value=0 range=(-1.22173 1.22173) clamped=true
      PhysicalOffsetFrame radius_l_offset: socket_parent=/bodyset/radius_l
          translation=(-0.00738857 -0.198082 -0.01143099)
      SpatialTransform: axes_held_at_zero=(rotation2 rotation3 translation1 translation2 translation3)
        TransformAxis rotation1: coordinates=wrist_flex_l axis=(0 0 1) LinearFunction(coefficients=1 0)
  ForceSet:
    Millard2012EquilibriumMuscle [values shared by the 88 below unless stated]:
      ActiveForceLengthCurve: minimum_value=0
      ForceVelocityCurve: concentric_slope_at_vmax=0 concentric_slope_near_vmax=0.25 isometric_slope=5
          eccentric_slope_at_vmax=0 eccentric_slope_near_vmax=0.15 max_eccentric_velocity_force_multiplier=1.4
      FiberForceLengthCurve
      TendonForceLengthCurve
    Millard2012EquilibriumMuscle addbrev_r: max_isometric_force=303.7 optimal_fiber_length=0.1046377
        tendon_slack_length=0.03653693 pennation_angle_at_optimal=0.1064651 [radians] minimum_activation=0.01
      PathPoint P1: pelvis (-0.0228408 -0.09969038 0.01841614)
      PathPoint P2: femur_r (-0.001850437 -0.1091758 0.02303794)
    Millard2012EquilibriumMuscle addlong_r: max_isometric_force=399.5 optimal_fiber_length=0.1029376
        tendon_slack_length=0.1236773 pennation_angle_at_optimal=0.1235693 minimum_activation=0.01
      PathPoint P1: pelvis (-0.009064569 -0.09428164 0.02257771)
      PathPoint P2: femur_r (0.01041796 -0.2214695 0.01464621)
    Millard2012EquilibriumMuscle addmagProx_r: max_isometric_force=324.2 optimal_fiber_length=0.1119573
        tendon_slack_length=0.04558869 pennation_angle_at_optimal=0.3872886 minimum_activation=0.01
      PathPoint P1: pelvis (-0.03704754 -0.1140606 0.0163234)
      PathPoint P2: femur_r (-0.01412808 -0.07296272 0.02962549)
    Millard2012EquilibriumMuscle addmagMid_r: max_isometric_force=324.2 optimal_fiber_length=0.1304148
        tendon_slack_length=0.04546049 pennation_angle_at_optimal=0.2567379 minimum_activation=0.01
      PathPoint P1: pelvis (-0.06297364 -0.1280597 0.03412966)
      PathPoint P2: femur_r (0.002239028 -0.1502555 0.02703488)
    Millard2012EquilibriumMuscle addmagDist_r: max_isometric_force=324.2 optimal_fiber_length=0.1617413
        tendon_slack_length=0.0821485 pennation_angle_at_optimal=0.2412045 minimum_activation=0.01
      PathPoint P1: pelvis (-0.08854099 -0.1353986 0.04761888)
      PathPoint P2: femur_r (0.01040871 -0.2428698 0.01785671)
    Millard2012EquilibriumMuscle addmagIsch_r: max_isometric_force=324.2 optimal_fiber_length=0.141988
        tendon_slack_length=0.2008921 pennation_angle_at_optimal=0.2073451 minimum_activation=0.01
      PathPoint P1: pelvis (-0.1071724 -0.1376151 0.04987905)
      PathPoint P2: femur_r (0.0044503 -0.358957 -0.0302824)
    Millard2012EquilibriumMuscle bflh_r: max_isometric_force=705.2 optimal_fiber_length=0.09022387
        tendon_slack_length=0.2976648 pennation_angle_at_optimal=0.2021091 minimum_activation=0.01
      PathPoint P1: pelvis (-0.1243688 -0.1263098 0.07007701)
      PathPoint P2: tibia_r (-0.03196206 -0.04285134 0.03357528)
    Millard2012EquilibriumMuscle bfsh_r: max_isometric_force=631.6 optimal_fiber_length=0.1038323
        tendon_slack_length=0.09790168 pennation_angle_at_optimal=0.2151991 minimum_activation=0.01
      PathPoint P1: femur_r (0.004626092 -0.1953136 0.02165011)
      PathPoint P2: tibia_r (-0.03034883 -0.04224638 0.03206288)
    Millard2012EquilibriumMuscle edl_r: max_isometric_force=345.4 optimal_fiber_length=0.06987289
        tendon_slack_length=0.3703364 pennation_angle_at_optimal=0.1890192 minimum_activation=0.01
      PathPoint P1: tibia_r (-0.01613227 -0.1166565 0.02066947)
      PathPoint P2: tibia_r (0.01653558 -0.3791083 0.01129259)
      PathPoint P3: calcn_r (0.09265972 0.03629761 0.0008066135)
      PathPoint P4: calcn_r (0.1629359 0.005545467 0.01310747)
      PathPoint P5: toes_r (0.00030248 0.004738854 0.01542648)
      PathPoint P6: toes_r (0.04466622 -0.0004033067 0.02520667)
    Millard2012EquilibriumMuscle ehl_r: max_isometric_force=165 optimal_fiber_length=0.07541836
        tendon_slack_length=0.3342404 pennation_angle_at_optimal=0.1647591 minimum_activation=0.01
      PathPoint P1: tibia_r (-0.01411574 -0.1562814 0.01905624)
      PathPoint P2: tibia_r (0.007057868 -0.2933048 0.01653558)
      PathPoint P3: tibia_r (0.02016534 -0.3723529 -0.002823147)
      PathPoint P4: calcn_r (0.09780188 0.03922158 -0.02127443)
      PathPoint P5: calcn_r (0.1303689 0.03115544 -0.02591246)
      PathPoint P6: calcn_r (0.1748335 0.01401491 -0.02823147)
      PathPoint P7: toes_r (0.03004635 0.004133894 -0.02470254)
      PathPoint P8: toes_r (0.05676542 0.003428107 -0.01875376)
    Millard2012EquilibriumMuscle fdl_r: max_isometric_force=274.4 optimal_fiber_length=0.0449687
        tendon_slack_length=0.3808224 pennation_angle_at_optimal=0.2380629 minimum_activation=0.01
      PathPoint P1: tibia_r (-0.002319014 -0.1847145 -0.00181488)
      PathPoint P2: tibia_r (-0.0177455 -0.3675133 -0.01250251)
      PathPoint P3: calcn_r (0.04396043 0.0317604 -0.02823147)
      PathPoint P4: calcn_r (0.07138529 0.0177455 -0.02651742)
      PathPoint P5: calcn_r (0.1671706 -0.008166961 0.0116959)
      PathPoint P6: toes_r (-0.001915707 -0.007864481 0.01482152)
      PathPoint P7: toes_r (0.0287356 -0.007158694 0.02167774)
      PathPoint P8: toes_r (0.04446457 -0.006049601 0.02440006)
    Millard2012EquilibriumMuscle fhl_r: max_isometric_force=436.8 optimal_fiber_length=0.05313566
        tendon_slack_length=0.358943 pennation_angle_at_optimal=0.2947861 minimum_activation=0.01
      PathPoint P1: tibia_r (-0.03125627 -0.2180881 0.02016534)
      PathPoint P2: tibia_r (-0.02440006 -0.3701347 -0.007662828)
      PathPoint P3: calcn_r (0.03770918 0.02782816 -0.02429923)
      PathPoint P4: calcn_r (0.1046581 0.006856214 -0.02581163)
      PathPoint P5: calcn_r (0.1740269 -0.005343814 -0.02712238)
      PathPoint P6: toes_r (0.01562814 -0.006452908 -0.02671907)
      PathPoint P7: toes_r (0.05666459 -0.01028432 -0.01824963)
    Millard2012EquilibriumMuscle gaslat_r: max_isometric_force=606.4 optimal_fiber_length=0.05895434
        tendon_slack_length=0.3699686 pennation_angle_at_optimal=0.2101376 minimum_activation=0.01
      PathPoint P1: femur_r (-0.002775655 -0.3528783 0.02562855)
      PathPoint P2: calcn_r (0.004436374 0.03125627 -0.005343814)
      PathWrap pathwrap_0: wrap_object=Gastroc_at_Condyles_r method=hybrid
    Millard2012EquilibriumMuscle gasmed_r: max_isometric_force=1308 optimal_fiber_length=0.05106343
        tendon_slack_length=0.3894838 pennation_angle_at_optimal=0.1724385 minimum_activation=0.01
      PathPoint P1: femur_r (0.007401747 -0.3504727 -0.01924454)
      PathPoint P2: calcn_r (0.004436374 0.03125627 -0.005343814)
      PathWrap pathwrap_0: wrap_object=Gastroc_at_Condyles_r method=hybrid
    Millard2012EquilibriumMuscle gem_r: max_isometric_force=218 optimal_fiber_length=0.02582682
        tendon_slack_length=0.04196858 pennation_angle_at_optimal=0 minimum_activation=0.01
      PathPoint P1: pelvis (-0.1238545 -0.08102494 0.08020589)
      PathPoint P2: femur_r (-0.0131381 -0.003053221 0.04098717)
    Millard2012EquilibriumMuscle glmax1_r: max_isometric_force=1092.2 optimal_fiber_length=0.154469
        tendon_slack_length=0.05243346 pennation_angle_at_optimal=0.3829252 minimum_activation=0.01
      PathPoint P1: pelvis (-0.1472096 0.03658849 0.06732655)
      PathPoint P2: pelvis (-0.1503188 -0.02566497 0.09315698)
      PathPoint P3: femur_r (-0.0410797 -0.03016212 0.02794159)
      PathPoint P4: femur_r (-0.02562855 -0.05236736 0.04348526)
      PathWrap pathwrap_0: wrap_object=Gmax_at_pelvis_r method=hybrid
    Millard2012EquilibriumMuscle glmax2_r: max_isometric_force=1561 optimal_fiber_length=0.1629823
        tendon_slack_length=0.0761415 pennation_angle_at_optimal=0.3829252 minimum_activation=0.01
      PathPoint P1: pelvis (-0.1574939 0.009226662 0.05524843)
      PathPoint P2: pelvis (-0.1607227 -0.06458664 0.09722289)
      PathPoint P3: femur_r (-0.04163483 -0.05403275 0.0233155)
      PathPoint P4: femur_r (-0.01443341 -0.09400219 0.03876665)
      PathWrap pathwrap_0: wrap_object=Gmax_at_pelvis_r method=hybrid
    Millard2012EquilibriumMuscle glmax3_r: max_isometric_force=1058.2 optimal_fiber_length=0.17259
        tendon_slack_length=0.07276766 pennation_angle_at_optimal=0.3829252 minimum_activation=0.01
      PathPoint P1: pelvis (-0.1554609 -0.05567814 0.01076268)
      PathPoint P2: pelvis (-0.1522321 -0.1339457 0.05201962)
      PathPoint P3: femur_r (-0.02599864 -0.1040871 0.008697053)
      PathPoint P4: femur_r (-0.00555131 -0.1312885 0.03802647)
      PathWrap pathwrap_0: wrap_object=Gmax_at_pelvis_r method=hybrid
    Millard2012EquilibriumMuscle glmed1_r: max_isometric_force=1762.2 optimal_fiber_length=0.07596374
        tendon_slack_length=0.05855322 pennation_angle_at_optimal=0.3572689 minimum_activation=0.01
      PathPoint P1: pelvis (-0.05321548 0.02598313 0.140154)
      PathPoint P2: femur_r (-0.02016976 -0.01082505 0.05134962)
    Millard2012EquilibriumMuscle glmed2_r: max_isometric_force=1033 optimal_fiber_length=0.07606895
        tendon_slack_length=0.06849319 pennation_angle_at_optimal=0.3572689 minimum_activation=0.01
      PathPoint P1: pelvis (-0.1016475 0.03351293 0.08072011)
      PathPoint P2: femur_r (-0.02387063 -0.005366267 0.04875901)
    Millard2012EquilibriumMuscle glmed3_r: max_isometric_force=1404 optimal_fiber_length=0.07825473
        tendon_slack_length=0.04910938 pennation_angle_at_optimal=0.3572689 minimum_activation=0.01
      PathPoint P1: pelvis (-0.1377623 -0.007741912 0.06290189)
      PathPoint P2: femur_r (-0.02858925 -0.004348526 0.04792631)
    Millard2012EquilibriumMuscle glmin1_r: max_isometric_force=720 optimal_fiber_length=0.06827271
        tendon_slack_length=0.01606417 pennation_angle_at_optimal=0.1745329 minimum_activation=0.01
      PathPoint P1: pelvis (-0.0554876 -0.01580198 0.1246079)
      PathPoint P2: femur_r (-0.006661572 -0.009622271 0.05181223)
    Millard2012EquilibriumMuscle glmin2_r: max_isometric_force=760 optimal_fiber_length=0.05577339
        tendon_slack_length=0.02589479 pennation_angle_at_optimal=0 minimum_activation=0.01
      PathPoint P1: pelvis (-0.07366457 -0.01505961 0.1161174)
      PathPoint P2: femur_r (-0.008882096 -0.009622271 0.05181223)
    Millard2012EquilibriumMuscle glmin3_r: max_isometric_force=860 optimal_fiber_length=0.03831493
        tendon_slack_length=0.05142267 pennation_angle_at_optimal=0.01745329 minimum_activation=0.01
      PathPoint P1: pelvis (-0.09435284 -0.01643831 0.09542911)
      PathPoint P2: femur_r (-0.01249045 -0.007679312 0.05088701)
    Millard2012EquilibriumMuscle grac_r: max_isometric_force=137.3 optimal_fiber_length=0.2112698
        tendon_slack_length=0.1567366 pennation_angle_at_optimal=0.1424189 minimum_activation=0.01
      PathPoint P1: pelvis (-0.05663562 -0.1371485 0.02937016)
      PathPoint P2: tibia_r (-0.01857227 -0.04794309 -0.02985478)
      PathPoint P3: tibia_r (0.001794715 -0.07019554 -0.01586004)
      PathWrap pathwrap_0: wrap_object=GR_at_condyles_r method=midpoint
    Millard2012EquilibriumMuscle iliacus_r: max_isometric_force=2487.6 optimal_fiber_length=0.1120883
        tendon_slack_length=0.09883961 pennation_angle_at_optimal=0.2494076 minimum_activation=0.01
      PathPoint P1: pelvis (-0.07234913 0.03277056 0.1008104)
      PathPoint P2: pelvis (-0.01614402 -0.05907185 0.09040652)
      PathPoint P3: femur_r (-0.002128002 -0.05227484 0.01286054)
      PathPoint P4: femur_r (-0.01128766 -0.05884389 0.01813428)
      PathWrap pathwrap_0: wrap_object=IL_at_brim_r method=hybrid
    Millard2012EquilibriumMuscle pect_r: max_isometric_force=177 optimal_fiber_length=0.1000504
        tendon_slack_length=0.03301662 pennation_angle_at_optimal=0 minimum_activation=0.01
      PathPoint P1: pelvis (-0.0277438 -0.08828961 0.0541602)
      PathPoint P2: femur_r (-0.00737399 -0.0788101 0.022233)
      PathWrap pathwrap_0: wrap_object=PECT_at_femshaft_r method=hybrid
    Millard2012EquilibriumMuscle perbrev_r: max_isometric_force=305.9 optimal_fiber_length=0.04577531
        tendon_slack_length=0.1493243 pennation_angle_at_optimal=0.2000147 minimum_activation=0.01
      PathPoint P1: tibia_r (-0.02450088 -0.2552932 0.0253075)
      PathPoint P2: tibia_r (-0.03418025 -0.3925183 0.02510584)
      PathPoint P3: tibia_r (-0.0287356 -0.40371 0.0257108)
      PathPoint P4: calcn_r (0.04748937 0.0272232 0.02349262)
      PathPoint P5: calcn_r (0.06825966 0.02208104 0.03458355)
    Millard2012EquilibriumMuscle perlong_r: max_isometric_force=653.3 optimal_fiber_length=0.05121995
        tendon_slack_length=0.3357528 pennation_angle_at_optimal=0.2457424 minimum_activation=0.01
      PathPoint P1: tibia_r (-0.02016534 -0.138435 0.02843312)
      PathPoint P2: tibia_r (-0.03196206 -0.3932241 0.02389592)
      PathPoint P3: tibia_r (-0.02742486 -0.4047183 0.0241984)
      PathPoint P4: calcn_r (0.04416209 0.02319014 0.0222827)
      PathPoint P5: calcn_r (0.06866297 0.01068763 0.02863478)
      PathPoint P6: calcn_r (0.08590433 0.006957041 0.01189755)
      PathPoint P7: calcn_r (0.1212945 0.008570268 -0.01855211)
    Millard2012EquilibriumMuscle pertert_r: max_isometric_force=90 optimal_fiber_length=0.07965308
        tendon_slack_length=0.1008267 pennation_angle_at_optimal=0.2268928 minimum_activation=0.01
      PathPoint P1: tibia_r (-0.01502318 -0.2505543 0.02238352)
      PathPoint P2: tibia_r (0.01088928 -0.3851579 0.022686)
      PathPoint P3: calcn_r (0.08640847 0.02298848 0.03014718)
    Millard2012EquilibriumMuscle piri_r: max_isometric_force=296 optimal_fiber_length=0.02876141
        tendon_slack_length=0.1272139 pennation_angle_at_optimal=0.1745329 minimum_activation=0.01
      PathPoint P1: pelvis (-0.1217498 -0.006925299 0.01615598)
      PathPoint P2: pelvis (-0.122001 -0.03251603 0.07285139)
      PathPoint P3: femur_r (-0.01369323 -0.003330786 0.04043204)
    Millard2012EquilibriumMuscle psoas_r: max_isometric_force=1916 optimal_fiber_length=0.123297
        tendon_slack_length=0.102308 pennation_angle_at_optimal=0.1860521 minimum_activation=0.01
      PathPoint P1: pelvis (-0.07246872 0.06564717 0.04663828)
      PathPoint P2: pelvis (-0.024515 -0.06935905 0.07844799)
      PathPoint P3: femur_r (-0.01221288 -0.0432077 0.004256004)
      PathPoint P4: femur_r (-0.02174263 -0.04848144 0.008141922)
      PathWrap pathwrap_0: wrap_object=PS_at_brim_r method=hybrid
    Millard2012EquilibriumMuscle quadfem_r: max_isometric_force=508 optimal_fiber_length=0.06033993
        tendon_slack_length=0.02681775 pennation_angle_at_optimal=0 minimum_activation=0.01
      PathPoint P1: pelvis (-0.1338399 -0.1216753 0.06177779)
      PathPoint P2: femur_r (-0.03307656 -0.03286376 0.03341889)
    Millard2012EquilibriumMuscle recfem_r: max_isometric_force=848.8 optimal_fiber_length=0.07096678
        tendon_slack_length=0.3405284 pennation_angle_at_optimal=0.2431244 minimum_activation=0.01
      PathPoint P1: pelvis (-0.02870048 -0.04114879 0.1115731)
      PathPoint P2: patella_r (-0.000102437 0.0149698 0.0011381)
      PathPoint P3: patella_r (0.00351873 0.0125708 0.00078874)
      PathWrap pathwrap_0: wrap_object=KnExt_at_fem_r
    Millard2012EquilibriumMuscle sart_r: max_isometric_force=113.5 optimal_fiber_length=0.3865176
        tendon_slack_length=0.1055011 pennation_angle_at_optimal=0.02321288 minimum_activation=0.01
      PathPoint P1: pelvis (-0.02331914 -0.01654436 0.1262821)
      PathPoint P2: femur_r (-0.002775655 -0.3301179 -0.03895169)
      PathPoint P3: tibia_r (-0.0253075 -0.0404315 -0.03680174)
      PathPoint P4: tibia_r (-0.01603144 -0.06039518 -0.02661824)
      PathPoint P5: tibia_r (0.01371243 -0.08166961 -0.002621494)
    Millard2012EquilibriumMuscle semimem_r: max_isometric_force=1162.7 optimal_fiber_length=0.06368342
        tendon_slack_length=0.3488744 pennation_angle_at_optimal=0.2633702 minimum_activation=0.01
      PathPoint P1: pelvis (-0.1180307 -0.1209011 0.0734254)
      PathPoint P2: tibia_r (-0.02923974 -0.04204473 -0.01976203)
    Millard2012EquilibriumMuscle semiten_r: max_isometric_force=301.9 optimal_fiber_length=0.1794905
        tendon_slack_length=0.2278506 pennation_angle_at_optimal=0.2244493 minimum_activation=0.01
      PathPoint P1: pelvis (-0.1241296 -0.1328851 0.06158645)
      PathPoint P2: tibia_r (-0.03145792 -0.05121995 -0.02308931)
      PathPoint P3: tibia_r (0.001915707 -0.07793902 -0.01179672)
    Millard2012EquilibriumMuscle soleus_r: max_isometric_force=3585.9 optimal_fiber_length=0.04436374
        tendon_slack_length=0.2838271 pennation_angle_at_optimal=0.4930555 minimum_activation=0.01
      PathPoint P1: tibia_r (-0.007662828 -0.09235724 0.009881015)
      PathPoint P2: calcn_r (0.004436374 0.03125627 -0.005343814)
    Millard2012EquilibriumMuscle tfl_r: max_isometric_force=155 optimal_fiber_length=0.09071373
        tendon_slack_length=0.4296966 pennation_angle_at_optimal=0.05235988 minimum_activation=0.01
      PathPoint P1: pelvis (-0.03719104 0.02269547 0.1484054)
      PathPoint P2: femur_r (0.02720142 -0.09205923 0.05523554)
      PathPoint P3: tibia_r (0.01088928 -0.04133894 0.03488603)
    Millard2012EquilibriumMuscle tibant_r: max_isometric_force=673.7 optimal_fiber_length=0.06886462
        tendon_slack_length=0.2429923 pennation_angle_at_optimal=0.1668535 minimum_activation=0.01
      PathPoint P1: tibia_r (0.01552731 -0.1322846 0.01633392)
      PathPoint P2: tibia_r (0.0253075 -0.1921757 0.01290582)
      PathPoint P3: tibia_r (0.02349262 -0.3689248 -0.01330912)
      PathPoint P4: calcn_r (0.1175639 0.01794715 -0.03075214)
    Millard2012EquilibriumMuscle tibpost_r: max_isometric_force=905.6 optimal_fiber_length=0.03811249
        tendon_slack_length=0.2841296 pennation_angle_at_optimal=0.2392846 minimum_activation=0.01
      PathPoint P1: tibia_r (-0.004133894 -0.131478 0.01038515)
      PathPoint P2: tibia_r (-0.01653558 -0.3685215 -0.01764467)
      PathPoint P3: calcn_r (0.04204473 0.03367611 -0.02883643)
      PathPoint P4: calcn_r (0.0778382 0.01603144 -0.0283323)
    Millard2012EquilibriumMuscle vasint_r: max_isometric_force=1024.2 optimal_fiber_length=0.09110082
        tendon_slack_length=0.1115595 pennation_angle_at_optimal=0.07923795 minimum_activation=0.01
      PathPoint P1: femur_r (0.02683133 -0.178012 0.02868177)
      PathPoint P2: femur_r (0.03099482 -0.1928155 0.02636872)
      PathPoint P3: patella_r (-0.00380437 0.0180608 -0.00035737)
      PathWrap pathwrap_0: wrap_object=KnExt_vasint_at_fem_r
    Millard2012EquilibriumMuscle vaslat_r: max_isometric_force=2255.4 optimal_fiber_length=0.09152317
        tendon_slack_length=0.1310236 pennation_angle_at_optimal=0.3207915 minimum_activation=0.01
      PathPoint P1: femur_r (0.004441048 -0.1715355 0.03229012)
      PathPoint P2: femur_r (0.02488837 -0.2397241 0.03784143)
      PathPoint P3: patella_r (0.00165463 0.0150908 0.01185)
      PathWrap pathwrap_0: wrap_object=KnExt_at_fem_r
    Millard2012EquilibriumMuscle vasmed_r: max_isometric_force=1443.7 optimal_fiber_length=0.08901372
        tendon_slack_length=0.1164167 pennation_angle_at_optimal=0.516792 minimum_activation=0.01
      PathPoint P1: femur_r (0.01295306 -0.1942033 0.01739411)
      PathPoint P2: femur_r (0.03293777 -0.256193 0.0008326965)
      PathPoint P3: patella_r (-0.000394407 0.0156828 -0.0093351)
      PathWrap pathwrap_0: wrap_object=KnExt_at_fem_r
    Millard2012EquilibriumMuscle addbrev_l: max_isometric_force=303.7 optimal_fiber_length=0.1046377
        tendon_slack_length=0.03653693 pennation_angle_at_optimal=0.1064651 minimum_activation=0.01
      PathPoint P1: pelvis (-0.0228408 -0.09969038 -0.01841614)
      PathPoint P2: femur_l (-0.001850437 -0.1091758 -0.02303794)
    Millard2012EquilibriumMuscle addlong_l: max_isometric_force=399.5 optimal_fiber_length=0.1029376
        tendon_slack_length=0.1236773 pennation_angle_at_optimal=0.1235693 minimum_activation=0.01
      PathPoint P1: pelvis (-0.009064569 -0.09428164 -0.02257771)
      PathPoint P2: femur_l (0.01041796 -0.2214695 -0.01464621)
    Millard2012EquilibriumMuscle addmagProx_l: max_isometric_force=324.2 optimal_fiber_length=0.1119573
        tendon_slack_length=0.04558869 pennation_angle_at_optimal=0.3872886 minimum_activation=0.01
      PathPoint P1: pelvis (-0.03704754 -0.1140606 -0.0163234)
      PathPoint P2: femur_l (-0.01412808 -0.07296272 -0.02962549)
    Millard2012EquilibriumMuscle addmagMid_l: max_isometric_force=324.2 optimal_fiber_length=0.1304148
        tendon_slack_length=0.04546049 pennation_angle_at_optimal=0.2567379 minimum_activation=0.01
      PathPoint P1: pelvis (-0.06297364 -0.1280597 -0.03412966)
      PathPoint P2: femur_l (0.002239028 -0.1502555 -0.02703488)
    Millard2012EquilibriumMuscle addmagDist_l: max_isometric_force=324.2 optimal_fiber_length=0.1617413
        tendon_slack_length=0.0821485 pennation_angle_at_optimal=0.2412045 minimum_activation=0.01
      PathPoint P1: pelvis (-0.08854099 -0.1353986 -0.04761888)
      PathPoint P2: femur_l (0.01040871 -0.2428698 -0.01785671)
    Millard2012EquilibriumMuscle addmagIsch_l: max_isometric_force=324.2 optimal_fiber_length=0.141988
        tendon_slack_length=0.2008921 pennation_angle_at_optimal=0.2073451 minimum_activation=0.01
      PathPoint P1: pelvis (-0.1071724 -0.1376151 -0.04987905)
      PathPoint P2: femur_l (0.0044503 -0.358957 0.0302824)
    Millard2012EquilibriumMuscle bflh_l: max_isometric_force=705.2 optimal_fiber_length=0.09022387
        tendon_slack_length=0.2976648 pennation_angle_at_optimal=0.2021091 minimum_activation=0.01
      PathPoint P1: pelvis (-0.1243688 -0.1263098 -0.07007701)
      PathPoint P2: tibia_l (-0.03196206 -0.04285134 -0.03357528)
    Millard2012EquilibriumMuscle bfsh_l: max_isometric_force=631.6 optimal_fiber_length=0.1038323
        tendon_slack_length=0.09790168 pennation_angle_at_optimal=0.2151991 minimum_activation=0.01
      PathPoint P1: femur_l (0.004626092 -0.1953136 -0.02165011)
      PathPoint P2: tibia_l (-0.03034883 -0.04224638 -0.03206288)
    Millard2012EquilibriumMuscle edl_l: max_isometric_force=345.4 optimal_fiber_length=0.06987289
        tendon_slack_length=0.3703364 pennation_angle_at_optimal=0.1890192 minimum_activation=0.01
      PathPoint P1: tibia_l (-0.01613227 -0.1166565 -0.02066947)
      PathPoint P2: tibia_l (0.01653558 -0.3791083 -0.01129259)
      PathPoint P3: calcn_l (0.09265972 0.03629761 -0.0008066135)
      PathPoint P4: calcn_l (0.1629359 0.005545467 -0.01310747)
      PathPoint P5: toes_l (0.00030248 0.004738854 -0.01542648)
      PathPoint P6: toes_l (0.04466622 -0.0004033067 -0.02520667)
    Millard2012EquilibriumMuscle ehl_l: max_isometric_force=165 optimal_fiber_length=0.07541836
        tendon_slack_length=0.3342404 pennation_angle_at_optimal=0.1647591 minimum_activation=0.01
      PathPoint P1: tibia_l (-0.01411574 -0.1562814 -0.01905624)
      PathPoint P2: tibia_l (0.007057868 -0.2933048 -0.01653558)
      PathPoint P3: tibia_l (0.02016534 -0.3723529 0.002823147)
      PathPoint P4: calcn_l (0.09780188 0.03922158 0.02127443)
      PathPoint P5: calcn_l (0.1303689 0.03115544 0.02591246)
      PathPoint P6: calcn_l (0.1748335 0.01401491 0.02823147)
      PathPoint P7: toes_l (0.03004635 0.004133894 0.02470254)
      PathPoint P8: toes_l (0.05676542 0.003428107 0.01875376)
    Millard2012EquilibriumMuscle fdl_l: max_isometric_force=274.4 optimal_fiber_length=0.0449687
        tendon_slack_length=0.3808224 pennation_angle_at_optimal=0.2380629 minimum_activation=0.01
      PathPoint P1: tibia_l (-0.002319014 -0.1847145 0.00181488)
      PathPoint P2: tibia_l (-0.0177455 -0.3675133 0.01250251)
      PathPoint P3: calcn_l (0.04396043 0.0317604 0.02823147)
      PathPoint P4: calcn_l (0.07138529 0.0177455 0.02651742)
      PathPoint P5: calcn_l (0.1671706 -0.008166961 -0.0116959)
      PathPoint P6: toes_l (-0.001915707 -0.007864481 -0.01482152)
      PathPoint P7: toes_l (0.0287356 -0.007158694 -0.02167774)
      PathPoint P8: toes_l (0.04446457 -0.006049601 -0.02440006)
    Millard2012EquilibriumMuscle fhl_l: max_isometric_force=436.8 optimal_fiber_length=0.05313566
        tendon_slack_length=0.358943 pennation_angle_at_optimal=0.2947861 minimum_activation=0.01
      PathPoint P1: tibia_l (-0.03125627 -0.2180881 -0.02016534)
      PathPoint P2: tibia_l (-0.02440006 -0.3701347 0.007662828)
      PathPoint P3: calcn_l (0.03770918 0.02782816 0.02429923)
      PathPoint P4: calcn_l (0.1046581 0.006856214 0.02581163)
      PathPoint P5: calcn_l (0.1740269 -0.005343814 0.02712238)
      PathPoint P6: toes_l (0.01562814 -0.006452908 0.02671907)
      PathPoint P7: toes_l (0.05666459 -0.01028432 0.01824963)
    Millard2012EquilibriumMuscle gaslat_l: max_isometric_force=606.4 optimal_fiber_length=0.05895434
        tendon_slack_length=0.3699686 pennation_angle_at_optimal=0.2101376 minimum_activation=0.01
      PathPoint P1: femur_l (-0.002775655 -0.3528783 -0.02562855)
      PathPoint P2: calcn_l (0.004436374 0.03125627 0.005343814)
      PathWrap pathwrap_0: wrap_object=Gastroc_at_Condyles_l method=hybrid
    Millard2012EquilibriumMuscle gasmed_l: max_isometric_force=1308 optimal_fiber_length=0.05106343
        tendon_slack_length=0.3894838 pennation_angle_at_optimal=0.1724385 minimum_activation=0.01
      PathPoint P1: femur_l (0.007401747 -0.3504727 0.01924454)
      PathPoint P2: calcn_l (0.004436374 0.03125627 0.005343814)
      PathWrap pathwrap_0: wrap_object=Gastroc_at_Condyles_l method=hybrid
    Millard2012EquilibriumMuscle gem_l: max_isometric_force=218 optimal_fiber_length=0.02582682
        tendon_slack_length=0.04196858 pennation_angle_at_optimal=0 minimum_activation=0.01
      PathPoint P1: pelvis (-0.1238545 -0.08102494 -0.08020589)
      PathPoint P2: femur_l (-0.0131381 -0.003053221 -0.04098717)
    Millard2012EquilibriumMuscle glmax1_l: max_isometric_force=1092.2 optimal_fiber_length=0.154469
        tendon_slack_length=0.05243346 pennation_angle_at_optimal=0.3829252 minimum_activation=0.01
      PathPoint P1: pelvis (-0.1472096 0.03658849 -0.06732655)
      PathPoint P2: pelvis (-0.1503188 -0.02566497 -0.09315698)
      PathPoint P3: femur_l (-0.0410797 -0.03016212 -0.02794159)
      PathPoint P4: femur_l (-0.02562855 -0.05236736 -0.04348526)
      PathWrap pathwrap_0: wrap_object=Gmax_at_pelvis_l method=hybrid
    Millard2012EquilibriumMuscle glmax2_l: max_isometric_force=1561 optimal_fiber_length=0.1629823
        tendon_slack_length=0.0761415 pennation_angle_at_optimal=0.3829252 minimum_activation=0.01
      PathPoint P1: pelvis (-0.1574939 0.009226662 -0.05524843)
      PathPoint P2: pelvis (-0.1607227 -0.06458664 -0.09722289)
      PathPoint P3: femur_l (-0.04163483 -0.05403275 -0.0233155)
      PathPoint P4: femur_l (-0.01443341 -0.09400219 -0.03876665)
      PathWrap pathwrap_0: wrap_object=Gmax_at_pelvis_l method=hybrid
    Millard2012EquilibriumMuscle glmax3_l: max_isometric_force=1058.2 optimal_fiber_length=0.17259
        tendon_slack_length=0.07276766 pennation_angle_at_optimal=0.3829252 minimum_activation=0.01
      PathPoint P1: pelvis (-0.1554609 -0.05567814 -0.01076268)
      PathPoint P2: pelvis (-0.1522321 -0.1339457 -0.05201962)
      PathPoint P3: femur_l (-0.02599864 -0.1040871 -0.008697053)
      PathPoint P4: femur_l (-0.00555131 -0.1312885 -0.03802647)
      PathWrap pathwrap_0: wrap_object=Gmax_at_pelvis_l method=hybrid
    Millard2012EquilibriumMuscle glmed1_l: max_isometric_force=1762.2 optimal_fiber_length=0.07596374
        tendon_slack_length=0.05855322 pennation_angle_at_optimal=0.3572689 minimum_activation=0.01
      PathPoint P1: pelvis (-0.05321548 0.02598313 -0.140154)
      PathPoint P2: femur_l (-0.02016976 -0.01082505 -0.05134962)
    Millard2012EquilibriumMuscle glmed2_l: max_isometric_force=1033 optimal_fiber_length=0.07606895
        tendon_slack_length=0.06849319 pennation_angle_at_optimal=0.3572689 minimum_activation=0.01
      PathPoint P1: pelvis (-0.1016475 0.03351293 -0.08072011)
      PathPoint P2: femur_l (-0.02387063 -0.005366267 -0.04875901)
    Millard2012EquilibriumMuscle glmed3_l: max_isometric_force=1404 optimal_fiber_length=0.07825473
        tendon_slack_length=0.04910938 pennation_angle_at_optimal=0.3572689 minimum_activation=0.01
      PathPoint P1: pelvis (-0.1377623 -0.007741912 -0.06290189)
      PathPoint P2: femur_l (-0.02858925 -0.004348526 -0.04792631)
    Millard2012EquilibriumMuscle glmin1_l: max_isometric_force=720 optimal_fiber_length=0.06827271
        tendon_slack_length=0.01606417 pennation_angle_at_optimal=0.1745329 minimum_activation=0.01
      PathPoint P1: pelvis (-0.0554876 -0.01580198 -0.1246079)
      PathPoint P2: femur_l (-0.006661572 -0.009622271 -0.05181223)
    Millard2012EquilibriumMuscle glmin2_l: max_isometric_force=760 optimal_fiber_length=0.05577339
        tendon_slack_length=0.02589479 pennation_angle_at_optimal=0 minimum_activation=0.01
      PathPoint P1: pelvis (-0.07366457 -0.01505961 -0.1161174)
      PathPoint P2: femur_l (-0.008882096 -0.009622271 -0.05181223)
    Millard2012EquilibriumMuscle glmin3_l: max_isometric_force=860 optimal_fiber_length=0.03831493
        tendon_slack_length=0.05142267 pennation_angle_at_optimal=0.01745329 minimum_activation=0.01
      PathPoint P1: pelvis (-0.09435284 -0.01643831 -0.09542911)
      PathPoint P2: femur_l (-0.01249045 -0.007679312 -0.05088701)
    Millard2012EquilibriumMuscle grac_l: max_isometric_force=137.3 optimal_fiber_length=0.2112698
        tendon_slack_length=0.1567366 pennation_angle_at_optimal=0.1424189 minimum_activation=0.01
      PathPoint P1: pelvis (-0.05663562 -0.1371485 -0.02937016)
      PathPoint P2: tibia_l (-0.01857227 -0.04794309 0.02985478)
      PathPoint P3: tibia_l (0.001794715 -0.07019554 0.01586004)
      PathWrap pathwrap_0: wrap_object=GR_at_condyles_l method=midpoint
    Millard2012EquilibriumMuscle iliacus_l: max_isometric_force=2487.6 optimal_fiber_length=0.1120883
        tendon_slack_length=0.09883961 pennation_angle_at_optimal=0.2494076 minimum_activation=0.01
      PathPoint P1: pelvis (-0.07234913 0.03277056 -0.1008104)
      PathPoint P2: pelvis (-0.01614402 -0.05907185 -0.09040652)
      PathPoint P3: femur_l (-0.002128002 -0.05227484 -0.01286054)
      PathPoint P4: femur_l (-0.01128766 -0.05884389 -0.01813428)
      PathWrap pathwrap_0: wrap_object=IL_at_brim_l method=hybrid
    Millard2012EquilibriumMuscle pect_l: max_isometric_force=177 optimal_fiber_length=0.1000504
        tendon_slack_length=0.03301662 pennation_angle_at_optimal=0 minimum_activation=0.01
      PathPoint P1: pelvis (-0.0277438 -0.08828961 -0.0541602)
      PathPoint P2: femur_l (-0.00737399 -0.0788101 -0.022233)
      PathWrap pathwrap_0: wrap_object=PECT_at_femshaft_l method=hybrid
    Millard2012EquilibriumMuscle perbrev_l: max_isometric_force=305.9 optimal_fiber_length=0.04577531
        tendon_slack_length=0.1493243 pennation_angle_at_optimal=0.2000147 minimum_activation=0.01
      PathPoint P1: tibia_l (-0.02450088 -0.2552932 -0.0253075)
      PathPoint P2: tibia_l (-0.03418025 -0.3925183 -0.02510584)
      PathPoint P3: tibia_l (-0.0287356 -0.40371 -0.0257108)
      PathPoint P4: calcn_l (0.04748937 0.0272232 -0.02349262)
      PathPoint P5: calcn_l (0.06825966 0.02208104 -0.03458355)
    Millard2012EquilibriumMuscle perlong_l: max_isometric_force=653.3 optimal_fiber_length=0.05121995
        tendon_slack_length=0.3357528 pennation_angle_at_optimal=0.2457424 minimum_activation=0.01
      PathPoint P1: tibia_l (-0.02016534 -0.138435 -0.02843312)
      PathPoint P2: tibia_l (-0.03196206 -0.3932241 -0.02389592)
      PathPoint P3: tibia_l (-0.02742486 -0.4047183 -0.0241984)
      PathPoint P4: calcn_l (0.04416209 0.02319014 -0.0222827)
      PathPoint P5: calcn_l (0.06866297 0.01068763 -0.02863478)
      PathPoint P6: calcn_l (0.08590433 0.006957041 -0.01189755)
      PathPoint P7: calcn_l (0.1212945 0.008570268 0.01855211)
    Millard2012EquilibriumMuscle pertert_l: max_isometric_force=90 optimal_fiber_length=0.07965308
        tendon_slack_length=0.1008267 pennation_angle_at_optimal=0.2268928 minimum_activation=0.01
      PathPoint P1: tibia_l (-0.01502318 -0.2505543 -0.02238352)
      PathPoint P2: tibia_l (0.01088928 -0.3851579 -0.022686)
      PathPoint P3: calcn_l (0.08640847 0.02298848 -0.03014718)
    Millard2012EquilibriumMuscle piri_l: max_isometric_force=296 optimal_fiber_length=0.02876141
        tendon_slack_length=0.1272139 pennation_angle_at_optimal=0.1745329 minimum_activation=0.01
      PathPoint P1: pelvis (-0.1217498 -0.006925299 -0.01615598)
      PathPoint P2: pelvis (-0.122001 -0.03251603 -0.07285139)
      PathPoint P3: femur_l (-0.01369323 -0.003330786 -0.04043204)
    Millard2012EquilibriumMuscle psoas_l: max_isometric_force=1916 optimal_fiber_length=0.123297
        tendon_slack_length=0.102308 pennation_angle_at_optimal=0.1860521 minimum_activation=0.01
      PathPoint P1: pelvis (-0.07246872 0.06564717 -0.04663828)
      PathPoint P2: pelvis (-0.024515 -0.06935905 -0.07844799)
      PathPoint P3: femur_l (-0.01221288 -0.0432077 -0.004256004)
      PathPoint P4: femur_l (-0.02174263 -0.04848144 -0.008141922)
      PathWrap pathwrap_0: wrap_object=PS_at_brim_l method=hybrid
    Millard2012EquilibriumMuscle quadfem_l: max_isometric_force=508 optimal_fiber_length=0.06033993
        tendon_slack_length=0.02681775 pennation_angle_at_optimal=0 minimum_activation=0.01
      PathPoint P1: pelvis (-0.1338399 -0.1216753 -0.06177779)
      PathPoint P2: femur_l (-0.03307656 -0.03286376 -0.03341889)
    Millard2012EquilibriumMuscle recfem_l: max_isometric_force=848.8 optimal_fiber_length=0.07096678
        tendon_slack_length=0.3405284 pennation_angle_at_optimal=0.2431244 minimum_activation=0.01
      PathPoint P1: pelvis (-0.02870048 -0.04114879 -0.1115731)
      PathPoint P2: patella_l (-0.000102437 0.0149698 -0.0011381)
      PathPoint P3: patella_l (0.00351873 0.0125708 -0.00078874)
      PathWrap pathwrap_0: wrap_object=KnExt_at_fem_l
    Millard2012EquilibriumMuscle sart_l: max_isometric_force=113.5 optimal_fiber_length=0.3865176
        tendon_slack_length=0.1055011 pennation_angle_at_optimal=0.02321288 minimum_activation=0.01
      PathPoint P1: pelvis (-0.02331914 -0.01654436 -0.1262821)
      PathPoint P2: femur_l (-0.002775655 -0.3301179 0.03895169)
      PathPoint P3: tibia_l (-0.0253075 -0.0404315 0.03680174)
      PathPoint P4: tibia_l (-0.01603144 -0.06039518 0.02661824)
      PathPoint P5: tibia_l (0.01371243 -0.08166961 0.002621494)
    Millard2012EquilibriumMuscle semimem_l: max_isometric_force=1162.7 optimal_fiber_length=0.06368342
        tendon_slack_length=0.3488744 pennation_angle_at_optimal=0.2633702 minimum_activation=0.01
      PathPoint P1: pelvis (-0.1180307 -0.1209011 -0.0734254)
      PathPoint P2: tibia_l (-0.02923974 -0.04204473 0.01976203)
    Millard2012EquilibriumMuscle semiten_l: max_isometric_force=301.9 optimal_fiber_length=0.1794905
        tendon_slack_length=0.2278506 pennation_angle_at_optimal=0.2244493 minimum_activation=0.01
      PathPoint P1: pelvis (-0.1241296 -0.1328851 -0.06158645)
      PathPoint P2: tibia_l (-0.03145792 -0.05121995 0.02308931)
      PathPoint P3: tibia_l (0.001915707 -0.07793902 0.01179672)
    Millard2012EquilibriumMuscle soleus_l: max_isometric_force=3585.9 optimal_fiber_length=0.04436374
        tendon_slack_length=0.2838271 pennation_angle_at_optimal=0.4930555 minimum_activation=0.01
      PathPoint P1: tibia_l (-0.007662828 -0.09235724 -0.009881015)
      PathPoint P2: calcn_l (0.004436374 0.03125627 0.005343814)
    Millard2012EquilibriumMuscle tfl_l: max_isometric_force=155 optimal_fiber_length=0.09071373
        tendon_slack_length=0.4296966 pennation_angle_at_optimal=0.05235988 minimum_activation=0.01
      PathPoint P1: pelvis (-0.03719104 0.02269547 -0.1484054)
      PathPoint P2: femur_l (0.02720142 -0.09205923 -0.05523554)
      PathPoint P3: tibia_l (0.01088928 -0.04133894 -0.03488603)
    Millard2012EquilibriumMuscle tibant_l: max_isometric_force=673.7 optimal_fiber_length=0.06886462
        tendon_slack_length=0.2429923 pennation_angle_at_optimal=0.1668535 minimum_activation=0.01
      PathPoint P1: tibia_l (0.01552731 -0.1322846 -0.01633392)
      PathPoint P2: tibia_l (0.0253075 -0.1921757 -0.01290582)
      PathPoint P3: tibia_l (0.02349262 -0.3689248 0.01330912)
      PathPoint P4: calcn_l (0.1175639 0.01794715 0.03075214)
    Millard2012EquilibriumMuscle tibpost_l: max_isometric_force=905.6 optimal_fiber_length=0.03811249
        tendon_slack_length=0.2841296 pennation_angle_at_optimal=0.2392846 minimum_activation=0.01
      PathPoint P1: tibia_l (-0.004133894 -0.131478 -0.01038515)
      PathPoint P2: tibia_l (-0.01653558 -0.3685215 0.01764467)
      PathPoint P3: calcn_l (0.04204473 0.03367611 0.02883643)
      PathPoint P4: calcn_l (0.0778382 0.01603144 0.0283323)
    Millard2012EquilibriumMuscle vasint_l: max_isometric_force=1024.2 optimal_fiber_length=0.09110082
        tendon_slack_length=0.1115595 pennation_angle_at_optimal=0.07923795 minimum_activation=0.01
      PathPoint P1: femur_l (0.02683133 -0.178012 -0.02868177)
      PathPoint P2: femur_l (0.03099482 -0.1928155 -0.02636872)
      PathPoint P3: patella_l (-0.00380437 0.0180608 0.00035737)
      PathWrap pathwrap_0: wrap_object=KnExt_vasint_at_fem_l
    Millard2012EquilibriumMuscle vaslat_l: max_isometric_force=2255.4 optimal_fiber_length=0.09152317
        tendon_slack_length=0.1310236 pennation_angle_at_optimal=0.3207915 minimum_activation=0.01
      PathPoint P1: femur_l (0.004441048 -0.1715355 -0.03229012)
      PathPoint P2: femur_l (0.02488837 -0.2397241 -0.03784143)
      PathPoint P3: patella_l (0.00165463 0.0150908 -0.01185)
      PathWrap pathwrap_0: wrap_object=KnExt_at_fem_l
    Millard2012EquilibriumMuscle vasmed_l: max_isometric_force=1443.7 optimal_fiber_length=0.08901372
        tendon_slack_length=0.1164167 pennation_angle_at_optimal=0.516792 minimum_activation=0.01
      PathPoint P1: femur_l (0.01295306 -0.1942033 -0.01739411)
      PathPoint P2: femur_l (0.03293777 -0.256193 -0.0008326965)
      PathPoint P3: patella_l (-0.000394407 0.0156828 0.0093351)
      PathWrap pathwrap_0: wrap_object=KnExt_at_fem_l
    Blankevoort1991Ligament MCLd1_r: linear_stiffness=500 [N] slack_length=0.03075 [m]
      PathPoint MCLd1-P1_r: femur_distal_r (-0.0017455 -0.00045737 -0.037269)
      PathPoint MCLd1-P2_r: tibia_proximal_r (-0.00021515 -0.031853 -0.031379)
      PathWrap pathwrap_: wrap_object=Med_Lig_r method=hybrid
    Blankevoort1991Ligament MCLd2_r: linear_stiffness=500 slack_length=0.0326782
      PathPoint MCLd2-P1_r: femur_distal_r (0.0028899 -0.0006742 -0.038035)
      PathPoint MCLd2-P2_r: tibia_proximal_r (0.0049463 -0.031262 -0.031379)
      PathWrap pathwrap_: wrap_object=Med_Lig_r method=hybrid
    Blankevoort1991Ligament MCLd3_r: linear_stiffness=500 slack_length=0.0371214
      PathPoint MCLd3-P1_r: femur_distal_r (0.0038775 0.0036824 -0.039033)
      PathPoint MCLd3-P2_r: tibia_proximal_r (0.0054198 -0.032627 -0.031467)
      PathWrap pathwrap_: wrap_object=Med_Lig_r method=hybrid
    Blankevoort1991Ligament MCLd4_r: linear_stiffness=500 slack_length=0.0332443
      PathPoint MCLd4-P1_r: femur_distal_r (0.00096177 0.0014429 -0.038236)
      PathPoint MCLd4-P2_r: tibia_proximal_r (0.0026082 -0.032414 -0.031427)
      PathWrap pathwrap_: wrap_object=Med_Lig_r method=hybrid
    Blankevoort1991Ligament MCLd5_r: linear_stiffness=500 slack_length=0.0372798
      PathPoint MCLd5-P1_r: femur_distal_r (-0.0010825 0.0046882 -0.038669)
      PathPoint MCLd5-P2_r: tibia_proximal_r (-9.2907e-5 -0.033387 -0.031424)
      PathWrap pathwrap_: wrap_object=Med_Lig_r method=hybrid
    Blankevoort1991Ligament MCLs1_r: linear_stiffness=500 slack_length=0.0723198
      PathPoint MCLs1-P1_r: femur_distal_r (0.0053709 0.0083394 -0.04065)
      PathPoint MCLs1-P2_r: tibia_proximal_r (0.014323 -0.061131 -0.015466)
      PathWrap pathwrap_: wrap_object=Med_Lig_r method=hybrid
    Blankevoort1991Ligament MCLs2_r: linear_stiffness=500 slack_length=0.0897982
      PathPoint MCLs2-P1_r: femur_distal_r (0.0056326 0.015275 -0.040595)
      PathPoint MCLs2-P2_r: tibia_proximal_r (0.019234 -0.071438 -0.010942)
      PathWrap pathwrap_: wrap_object=Med_Lig_r method=hybrid
    Blankevoort1991Ligament MCLs3_r: linear_stiffness=500 slack_length=0.0713573
      PathPoint MCLs3-P1_r: femur_distal_r (-0.00040512 0.016541 -0.038878)
      PathPoint MCLs3-P2_r: tibia_proximal_r (0.0011834 -0.05547 -0.021542)
      PathWrap pathwrap_: wrap_object=Med_Lig_r method=hybrid
    Blankevoort1991Ligament MCLs4_r: linear_stiffness=500 slack_length=0.0822692
      PathPoint MCLs4-P1_r: femur_distal_r (-0.0011507 0.0080931 -0.039482)
      PathPoint MCLs4-P2_r: tibia_proximal_r (0.0065168 -0.074829 -0.017341)
      PathWrap pathwrap_: wrap_object=Med_Lig_r method=hybrid
    Blankevoort1991Ligament MCLs5_r: linear_stiffness=500 slack_length=0.0781376
      PathPoint MCLs5-P1_r: femur_distal_r (0.0025007 0.011534 -0.040624)
      PathPoint MCLs5-P2_r: tibia_proximal_r (0.011919 -0.065762 -0.016444)
      PathWrap pathwrap_: wrap_object=Med_Lig_r method=hybrid
    Blankevoort1991Ligament MCLs6_r: linear_stiffness=500 slack_length=0.0741086
      PathPoint MCLs6-P1_r: femur_distal_r (0.00092052 0.013423 -0.040266)
      PathPoint MCLs6-P2_r: tibia_proximal_r (0.0071679 -0.06075 -0.019481)
      PathWrap pathwrap_: wrap_object=Med_Lig_r method=hybrid
    Blankevoort1991Ligament ACLpl1_r: linear_stiffness=820 slack_length=0.02249775
      PathPoint ACLpl1-P1_r: femur_distal_r (-0.0038361 -3.0877e-5 0.0070808)
      PathPoint ACLpl1-P2_r: tibia_proximal_r (0.010136 -0.020482 -0.00036186)
    Blankevoort1991Ligament ACLpl2_r: linear_stiffness=820 slack_length=0.02059895
      PathPoint ACLpl2-P1_r: femur_distal_r (-0.0038641 -0.0030479 0.0072371)
      PathPoint ACLpl2-P2_r: tibia_proximal_r (0.010071 -0.021322 0.0039158)
    Blankevoort1991Ligament ACLpl3_r: linear_stiffness=820 slack_length=0.02502492
      PathPoint ACLpl3-P1_r: femur_distal_r (-0.0012585 -0.00061438 0.005778)
      PathPoint ACLpl3-P2_r: tibia_proximal_r (0.014123 -0.021793 0.0014326)
    Blankevoort1991Ligament ACLpl4_r: linear_stiffness=820 slack_length=0.02270751
      PathPoint ACLpl4-P1_r: femur_distal_r (-0.00049734 -0.0048442 0.0061921)
      PathPoint ACLpl4-P2_r: tibia_proximal_r (0.014311 -0.021465 0.0048355)
    Blankevoort1991Ligament ACLpl5_r: linear_stiffness=820 slack_length=0.0219167
      PathPoint ACLpl5-P1_r: femur_distal_r (-0.0015255 -0.0021886 0.0062745)
      PathPoint ACLpl5-P2_r: tibia_proximal_r (0.012201 -0.021304 0.0017124)
    Blankevoort1991Ligament ACLpl6_r: linear_stiffness=820 slack_length=0.02249596
      PathPoint ACLpl6-P1_r: femur_distal_r (-0.0027392 -0.0031662 0.0068024)
      PathPoint ACLpl6-P2_r: tibia_proximal_r (0.012531 -0.021976 0.0043276)
    Blankevoort1991Ligament ACLam1_r: linear_stiffness=820 slack_length=0.03061722
      PathPoint ACLam1-P1_r: femur_distal_r (0.0011685 0.0031897 0.002616)
      PathPoint ACLam1-P2_r: tibia_proximal_r (0.016437 -0.020666 -0.0052185)
    Blankevoort1991Ligament ACLam2_r: linear_stiffness=820 slack_length=0.02683395
      PathPoint ACLam2-P1_r: femur_distal_r (-0.0011691 0.0010628 0.0052107)
      PathPoint ACLam2-P2_r: tibia_proximal_r (0.014972 -0.021642 -0.00057088)
    Blankevoort1991Ligament ACLam3_r: linear_stiffness=820 slack_length=0.02709163
      PathPoint ACLam3-P1_r: femur_distal_r (-0.0009364 0.0036972 0.0041682)
      PathPoint ACLam3-P2_r: tibia_proximal_r (0.011939 -0.019622 -0.0038468)
    Blankevoort1991Ligament ACLam4_r: linear_stiffness=820 slack_length=0.03098592
      PathPoint ACLam4-P1_r: femur_distal_r (0.00084902 0.0010256 0.0040526)
      PathPoint ACLam4-P2_r: tibia_proximal_r (0.018517 -0.022158 -0.001854)
    Blankevoort1991Ligament ACLam5_r: linear_stiffness=820 slack_length=0.0303046
      PathPoint ACLam5-P1_r: femur_distal_r (0.00056465 0.0025467 0.003565)
      PathPoint ACLam5-P2_r: tibia_proximal_r (0.016132 -0.02093 -0.0036845)
    Blankevoort1991Ligament ACLam6_r: linear_stiffness=820 slack_length=0.03009467
      PathPoint ACLam6-P1_r: femur_distal_r (-0.00057334 0.0017233 0.0046087)
      PathPoint ACLam6-P2_r: tibia_proximal_r (0.016387 -0.02174 -0.0013455)
    Blankevoort1991Ligament PCLal1_r: linear_stiffness=900 slack_length=0.0341994
      PathPoint PCLal1-P1_r: femur_distal_r (0.0010633 -0.0026457 -0.010709)
      PathPoint PCLal1-P2_r: tibia_proximal_r (-0.014049 -0.03139 0.0029368)
    Blankevoort1991Ligament PCLal2_r: linear_stiffness=900 slack_length=0.0312481
      PathPoint PCLal2-P1_r: femur_distal_r (0.0071112 -0.00473 -0.0046475)
      PathPoint PCLal2-P2_r: tibia_proximal_r (-0.010099 -0.02566 0.00288)
    Blankevoort1991Ligament PCLal3_r: linear_stiffness=900 slack_length=0.0325487
      PathPoint PCLal3-P1_r: femur_distal_r (0.0046634 -0.00088757 -0.0070401)
      PathPoint PCLal3-P2_r: tibia_proximal_r (-0.012055 -0.028137 0.0030545)
    Blankevoort1991Ligament PCLal4_r: linear_stiffness=900 slack_length=0.0334415
      PathPoint PCLal4-P1_r: femur_distal_r (0.0048125 -0.0045282 -0.00815)
      PathPoint PCLal4-P2_r: tibia_proximal_r (-0.012695 -0.030786 -0.0022615)
    Blankevoort1991Ligament PCLal5_r: linear_stiffness=900 slack_length=0.0333917
      PathPoint PCLal5-P1_r: femur_distal_r (0.0050176 -0.0034313 -0.0075544)
      PathPoint PCLal5-P2_r: tibia_proximal_r (-0.01241 -0.029808 0.00089554)
    Blankevoort1991Ligament PCLpm1_r: linear_stiffness=300 slack_length=0.0343383
      PathPoint PCLpm1-P1_r: femur_distal_r (0.0045535 -0.0054955 -0.0090256)
      PathPoint PCLpm1-P2_r: tibia_proximal_r (-0.013917 -0.031775 -0.0033347)
    Blankevoort1991Ligament PCLpm2_r: linear_stiffness=300 slack_length=0.035726
      PathPoint PCLpm2-P1_r: femur_distal_r (0.0022125 -0.008266 -0.010651)
      PathPoint PCLpm2-P2_r: tibia_proximal_r (-0.017052 -0.032778 -0.0065962)
    Blankevoort1991Ligament PCLpm3_r: linear_stiffness=300 slack_length=0.0306005
      PathPoint PCLpm3-P1_r: femur_distal_r (0.0018148 -0.0061646 -0.010734)
      PathPoint PCLpm3-P2_r: tibia_proximal_r (-0.013228 -0.029616 -0.0066956)
    Blankevoort1991Ligament PCLpm4_r: linear_stiffness=300 slack_length=0.0396514
      PathPoint PCLpm4-P1_r: femur_distal_r (0.0065082 -0.0078452 -0.0080514)
      PathPoint PCLpm4-P2_r: tibia_proximal_r (-0.016262 -0.033443 -0.0014326)
    Blankevoort1991Ligament PCLpm5_r: linear_stiffness=300 slack_length=0.0350972
      PathPoint PCLpm5-P1_r: femur_distal_r (0.0048766 -0.0078242 -0.0097349)
      PathPoint PCLpm5-P2_r: tibia_proximal_r (-0.014784 -0.032047 -0.0047864)
    Blankevoort1991Ligament LCL1_r: linear_stiffness=600 slack_length=0.0491649
      PathPoint LCL1-P1_r: femur_distal_r (-0.0021714 0.0020776 0.035465)
      PathPoint LCL1-P2_r: tibia_proximal_r (-0.013217 -0.048269 0.043157)
    Blankevoort1991Ligament LCL2_r: linear_stiffness=600 slack_length=0.0557048
      PathPoint LCL2-P1_r: femur_distal_r (-0.0021909 0.006045 0.035642)
      PathPoint LCL2-P2_r: tibia_proximal_r (-0.014842 -0.050771 0.045564)
    Blankevoort1991Ligament LCL3_r: linear_stiffness=600 slack_length=0.0532967
      PathPoint LCL3-P1_r: femur_distal_r (-0.000376 0.0039832 0.036523)
      PathPoint LCL3-P2_r: tibia_proximal_r (-0.011881 -0.050605 0.045433)
    Blankevoort1991Ligament LCL4_r: linear_stiffness=600 slack_length=0.0581642
      PathPoint LCL4-P1_r: femur_distal_r (-3.0505e-5 0.0065622 0.036488)
      PathPoint LCL4-P2_r: tibia_proximal_r (-0.011705 -0.053176 0.0463)
    Blankevoort1991Ligament PT1_r: linear_stiffness=3000 slack_length=0.0467917
      PathPoint PT1-P1_r: patella_r (0.0023888 -0.009575232 0.01486)
      PathPoint PT1-P2_r: tibia_proximal_r (0.032815 -0.046612 0.01998)
      PathWrap pathwrap_: wrap_object=PatTen_r method=hybrid
    Blankevoort1991Ligament PT2_r: linear_stiffness=3000 slack_length=0.0495326
      PathPoint PT2-P1_r: patella_r (0.0034486 -0.01150293 -0.011925)
      PathPoint PT2-P2_r: tibia_proximal_r (0.033646 -0.049788 0.0046861)
      PathWrap pathwrap_: wrap_object=PatTen_r method=hybrid
    Blankevoort1991Ligament PT3_r: linear_stiffness=3000 slack_length=0.0518791
      PathPoint PT3-P1_r: patella_r (0.0061702 -0.008735332 0.0034073)
      PathPoint PT3-P2_r: tibia_proximal_r (0.037044 -0.050068 0.014577)
      PathWrap pathwrap_: wrap_object=PatTen_r method=hybrid
    Blankevoort1991Ligament PT4_r: linear_stiffness=3000 slack_length=0.0406492
      PathPoint PT4-P1_r: patella_r (0.0028259 -0.01642144 0.0032342)
      PathPoint PT4-P2_r: tibia_proximal_r (0.034705 -0.046151 0.013008)
      PathWrap pathwrap_: wrap_object=PatTen_r method=hybrid
    Blankevoort1991Ligament PT5_r: linear_stiffness=3000 slack_length=0.0459407
      PathPoint PT5-P1_r: patella_r (0.0032667 -0.01249393 0.010452)
      PathPoint PT5-P2_r: tibia_proximal_r (0.035086 -0.048114 0.017907)
      PathWrap pathwrap_: wrap_object=PatTen_r method=hybrid
    Blankevoort1991Ligament PT6_r: linear_stiffness=3000 slack_length=0.046737
      PathPoint PT6-P1_r: patella_r (0.0058293 -0.01270133 -0.0037896)
      PathPoint PT6-P2_r: tibia_proximal_r (0.035954 -0.048374 0.0099597)
      PathWrap pathwrap_: wrap_object=PatTen_r method=hybrid
    Blankevoort1991Ligament lPFL1_r: linear_stiffness=150 slack_length=0.0341366
      PathPoint lPFL1-P1_r: femur_distal_r (0.02 0.01 0.035456)
      PathPoint lPFL1-P2_r: patella_r (-0.0015501 0.01082177 0.018582)
    Blankevoort1991Ligament lPFL2_r: linear_stiffness=150 slack_length=0.0365893
      PathPoint lPFL2-P1_r: femur_distal_r (0.023 0.0005 0.0344)
      PathPoint lPFL2-P2_r: patella_r (-0.00011041 -0.008670132 0.017223)
    Blankevoort1991Ligament lPFL3_r: linear_stiffness=150 slack_length=0.0337325
      PathPoint lPFL3-P1_r: femur_distal_r (0.017602 0.0055075 0.036008)
      PathPoint lPFL3-P2_r: patella_r (-0.0030893 0.002456768 0.021373)
    Blankevoort1991Ligament lPFL4_r: linear_stiffness=150 slack_length=0.0329245
      PathPoint lPFL4-P1_r: femur_distal_r (0.025 0.0070288 0.033883)
      PathPoint lPFL4-P2_r: patella_r (0.00092173 0.004008768 0.021066)
    Blankevoort1991Ligament lPFL5_r: linear_stiffness=150 slack_length=0.0329245
      PathPoint lPFL5-P1_r: femur_distal_r (0.019 0.008 0.035591)
      PathPoint lPFL5-P2_r: patella_r (-0.0025654 0.006071768 0.021187)
    Blankevoort1991Ligament lPFL6_r: linear_stiffness=150 slack_length=0.0331547
      PathPoint lPFL6-P1_r: femur_distal_r (0.019 0.003 0.035537)
      PathPoint lPFL6-P2_r: patella_r (-0.0024546 -0.004656232 0.020621)
    Blankevoort1991Ligament lPFL7_r: linear_stiffness=150 slack_length=0.033461
      PathPoint lPFL7-P1_r: femur_distal_r (0.023 0.0095 0.034)
      PathPoint lPFL7-P2_r: patella_r (-0.00087067 0.007909768 0.020645)
    Blankevoort1991Ligament lPFL8_r: linear_stiffness=150 slack_length=0.0336122
      PathPoint lPFL8-P1_r: femur_distal_r (0.0235 0.0042486 0.035)
      PathPoint lPFL8-P2_r: patella_r (-5.8994e-5 -0.0008052324 0.021541)
    Blankevoort1991Ligament mPFL1_r: linear_stiffness=150 slack_length=0.0471758
      PathPoint mPFL1-P1_r: femur_distal_r (0.01482 0.014851 -0.037847)
      PathPoint mPFL1-P2_r: patella_r (0.00022401 0.007770768 -0.018839)
    Blankevoort1991Ligament mPFL2_r: linear_stiffness=150 slack_length=0.0488893
      PathPoint mPFL2-P1_r: femur_distal_r (0.014175 0.0056463 -0.039555)
      PathPoint mPFL2-P2_r: patella_r (0.00109 -0.009672032 -0.016379)
    Blankevoort1991Ligament mPFL3_r: linear_stiffness=150 slack_length=0.0479773
      PathPoint mPFL3-P1_r: femur_distal_r (0.011384 0.010327 -0.040161)
      PathPoint mPFL3-P2_r: patella_r (0.00031179 -0.001101232 -0.020734)
    Blankevoort1991Ligament mPFL4_r: linear_stiffness=150 slack_length=0.0454419
      PathPoint mPFL4-P1_r: femur_distal_r (0.018919 0.010476 -0.036686)
      PathPoint mPFL4-P2_r: patella_r (0.0032401 -5.023237e-5 -0.020656)
    Blankevoort1991Ligament mPFL5_r: linear_stiffness=150 slack_length=0.045825
      PathPoint mPFL5-P1_r: femur_distal_r (0.015379 0.012476 -0.038367)
      PathPoint mPFL5-P2_r: patella_r (0.00088381 0.002788768 -0.020659)
    Blankevoort1991Ligament mPFL6_r: linear_stiffness=150 slack_length=0.0466035
      PathPoint mPFL6-P1_r: femur_distal_r (0.014485 0.0085394 -0.039286)
      PathPoint mPFL6-P2_r: patella_r (0.0016164 -0.004529232 -0.02005)
    Blankevoort1991Ligament MCLp1_r: linear_stiffness=500 slack_length=0.0292445
      PathPoint MCLp1-P1_r: femur_distal_r (-0.0080573 -0.0071292 -0.034763)
      PathPoint MCLp1-P2_r: tibia_proximal_r (-0.01695 -0.034752 -0.024723)
      PathWrap pathwrap_: wrap_object=Med_LigP_r method=hybrid
    Blankevoort1991Ligament MCLp2_r: linear_stiffness=500 slack_length=0.029917
      PathPoint MCLp2-P1_r: femur_distal_r (-0.0055986 -0.0063413 -0.03542)
      PathPoint MCLp2-P2_r: tibia_proximal_r (-0.0154 -0.034926 -0.02684)
      PathWrap pathwrap_: wrap_object=Med_LigP_r method=hybrid
    Blankevoort1991Ligament MCLp3_r: linear_stiffness=500 slack_length=0.0296519
      PathPoint MCLp3-P1_r: femur_distal_r (-0.0072934 -0.0097238 -0.034157)
      PathPoint MCLp3-P2_r: tibia_proximal_r (-0.015144 -0.037335 -0.024747)
      PathWrap pathwrap_: wrap_object=Med_LigP_r method=hybrid
    Blankevoort1991Ligament MCLp4_r: linear_stiffness=500 slack_length=0.0305328
      PathPoint MCLp4-P1_r: femur_distal_r (-0.0046077 -0.0095908 -0.034789)
      PathPoint MCLp4-P2_r: tibia_proximal_r (-0.01293 -0.037191 -0.02677)
      PathWrap pathwrap_: wrap_object=Med_LigP_r method=hybrid
    Blankevoort1991Ligament MCLp5_r: linear_stiffness=500 slack_length=0.0290979
      PathPoint MCLp5-P1_r: femur_distal_r (-0.0063085 -0.0083706 -0.034788)
      PathPoint MCLp5-P2_r: tibia_proximal_r (-0.015199 -0.03615 -0.025692)
      PathWrap pathwrap_: wrap_object=Med_LigP_r method=hybrid
    Blankevoort1991Ligament PFL1_r: linear_stiffness=440 slack_length=0.0437786
      PathPoint PFL1-P1_r_r: femur_distal_r (-0.0017516 -0.0011259 0.034832)
      PathPoint PFL1-P2_r: tibia_proximal_r (-0.023707 -0.039486 0.036077)
    Blankevoort1991Ligament PFL2_r: linear_stiffness=440 slack_length=0.0442336
      PathPoint PFL2-P1_r: femur_distal_r (-0.0009411 -0.0064366 0.033945)
      PathPoint PFL2-P2_r: tibia_proximal_r (-0.021428 -0.039528 0.034615)
    Blankevoort1991Ligament PFL3_r: linear_stiffness=440 slack_length=0.0491305
      PathPoint PFL3-P1_r: femur_distal_r (0.00435 -0.0027203 0.036774)
      PathPoint PFL3-P2_r: tibia_proximal_r (-0.023292 -0.041485 0.038865)
    Blankevoort1991Ligament PFL4_r: linear_stiffness=440 slack_length=0.0496406
      PathPoint PFL4-P1_r: femur_distal_r (0.0035 -0.007151 0.034517)
      PathPoint PFL4-P2_r: tibia_proximal_r (-0.021261 -0.041671 0.038733)
    Blankevoort1991Ligament PFL5_r: linear_stiffness=440 slack_length=0.0470791
      PathPoint PFL5-P1_r: femur_distal_r (0.0017 -0.0048477 0.03444)
      PathPoint PFL5-P2_r: tibia_proximal_r (-0.022384 -0.039633 0.036734)
    Blankevoort1991Ligament pCAP1_r: linear_stiffness=500 slack_length=0.0529591
      PathPoint pCAP1-P1_r: femur_distal_r (-0.00965 0.016897 -0.024009)
      PathPoint pCAP1-P2_r: tibia_proximal_r (-0.019173 -0.033168 -0.017395)
      PathWrap pathwrap_: wrap_object=Capsule_r
    Blankevoort1991Ligament pCAP2_r: linear_stiffness=500 slack_length=0.0545571
      PathPoint pCAP2-P1_r: femur_distal_r (-0.009839 0.016583 0.024113)
      PathPoint pCAP2-P2_r: tibia_proximal_r (-0.017485 -0.03569 0.021412)
      PathWrap pathwrap_: wrap_object=Capsule_r
    Blankevoort1991Ligament pCAP3_r: linear_stiffness=500 slack_length=0.0691082
      PathPoint pCAP3-P1_r: femur_distal_r (-0.00965 0.016897 -0.023009)
      PathPoint pCAP3-P2_r: tibia_proximal_r (-0.017476 -0.035694 0.020413)
      PathWrap pathwrap_: wrap_object=Capsule_r
    Blankevoort1991Ligament pCAP4_r: linear_stiffness=500 slack_length=0.0650427
      PathPoint pCAP4-P1_r: femur_distal_r (-0.009839 0.016583 0.023113)
      PathPoint pCAP4-P2_r: tibia_proximal_r (-0.01918 -0.033164 -0.016395)
      PathWrap pathwrap_: wrap_object=Capsule_r
    Blankevoort1991Ligament pCAP5_r: linear_stiffness=500 slack_length=0.0529102
      PathPoint pCAP5-P1_r: femur_distal_r (-0.00965 0.016897 -0.020009)
      PathPoint pCAP5-P2_r: tibia_proximal_r (-0.019206 -0.033152 -0.013396)
      PathWrap pathwrap_: wrap_object=Capsule_r
    Blankevoort1991Ligament pCAP6_r: linear_stiffness=500 slack_length=0.0546061
      PathPoint pCAP6-P1_r: femur_distal_r (-0.009839 0.016583 0.020113)
      PathPoint pCAP6-P2_r: tibia_proximal_r (-0.017453 -0.035705 0.017413)
      PathWrap pathwrap_: wrap_object=Capsule_r
    Blankevoort1991Ligament pCAP7_r: linear_stiffness=500 slack_length=0.0528622
      PathPoint pCAP7-P1_r: femur_distal_r (-0.00965 0.016897 -0.016009)
      PathPoint pCAP7-P2_r: tibia_proximal_r (-0.019237 -0.033136 -0.0093957)
      PathWrap pathwrap_: wrap_object=Capsule_r
    Blankevoort1991Ligament pCAP8_r: linear_stiffness=500 slack_length=0.0546568
      PathPoint pCAP8-P1_r: femur_distal_r (-0.009839 0.016583 0.016113)
      PathPoint pCAP8-P2_r: tibia_proximal_r (-0.01742 -0.035721 0.013413)
      PathWrap pathwrap_: wrap_object=Capsule_r
    Blankevoort1991Ligament ITB1_r: linear_stiffness=10000 slack_length=0.5351247
      PathPoint ITB1-P1_r: pelvis (-0.08370974 0.0530268 0.1195853)
      PathPoint ITB1-P2_r: femur_r (-0.009252184 -0.004348526 0.0555131)
      PathPoint ITB1-P3_r: tibia_r (0.01088928 -0.03125627 0.03488603)
    Blankevoort1991Ligament MCLd1_l: linear_stiffness=500 slack_length=0.03075
      PathPoint MCLd1-P1_l: femur_distal_l (-0.0017455 -0.00045737 0.037269)
      PathPoint MCLd1-P2_l: tibia_proximal_l (-0.00021515 -0.031853 0.031379)
      PathWrap pathwrap_: wrap_object=Med_Lig_l method=hybrid
    Blankevoort1991Ligament MCLd2_l: linear_stiffness=500 slack_length=0.0326782
      PathPoint MCLd2-P1_l: femur_distal_l (0.0028899 -0.0006742 0.038035)
      PathPoint MCLd2-P2_l: tibia_proximal_l (0.0049463 -0.031262 0.031379)
      PathWrap pathwrap_: wrap_object=Med_Lig_l method=hybrid
    Blankevoort1991Ligament MCLd3_l: linear_stiffness=500 slack_length=0.0371214
      PathPoint MCLd3-P1_l: femur_distal_l (0.0038775 0.0036824 0.039033)
      PathPoint MCLd3-P2_l: tibia_proximal_l (0.0054198 -0.032627 0.031467)
      PathWrap pathwrap_: wrap_object=Med_Lig_l method=hybrid
    Blankevoort1991Ligament MCLd4_l: linear_stiffness=500 slack_length=0.0332443
      PathPoint MCLd4-P1_l: femur_distal_l (0.00096177 0.0014429 0.038236)
      PathPoint MCLd4-P2_l: tibia_proximal_l (0.0026082 -0.032414 0.031427)
      PathWrap pathwrap_: wrap_object=Med_Lig_l method=hybrid
    Blankevoort1991Ligament MCLd5_l: linear_stiffness=500 slack_length=0.0372798
      PathPoint MCLd5-P1_l: femur_distal_l (-0.0010825 0.0046882 0.038669)
      PathPoint MCLd5-P2_l: tibia_proximal_l (-9.2907e-5 -0.033387 0.031424)
      PathWrap pathwrap_: wrap_object=Med_Lig_l method=hybrid
    Blankevoort1991Ligament MCLs1_l: linear_stiffness=500 slack_length=0.0723198
      PathPoint MCLs1-P1_l: femur_distal_l (0.0053709 0.0083394 0.04065)
      PathPoint MCLs1-P2_l: tibia_proximal_l (0.014323 -0.061131 0.015466)
      PathWrap pathwrap_: wrap_object=Med_Lig_l method=hybrid
    Blankevoort1991Ligament MCLs2_l: linear_stiffness=500 slack_length=0.0897982
      PathPoint MCLs2-P1_l: femur_distal_l (0.0056326 0.015275 0.040595)
      PathPoint MCLs2-P2_l: tibia_proximal_l (0.019234 -0.071438 0.010942)
      PathWrap pathwrap_: wrap_object=Med_Lig_l method=hybrid
    Blankevoort1991Ligament MCLs3_l: linear_stiffness=500 slack_length=0.0713573
      PathPoint MCLs3-P1_l: femur_distal_l (-0.00040512 0.016541 0.038878)
      PathPoint MCLs3-P2_l: tibia_proximal_l (0.0011834 -0.05547 0.021542)
      PathWrap pathwrap_: wrap_object=Med_Lig_l method=hybrid
    Blankevoort1991Ligament MCLs4_l: linear_stiffness=500 slack_length=0.0822692
      PathPoint MCLs4-P1_l: femur_distal_l (-0.0011507 0.0080931 0.039482)
      PathPoint MCLs4-P2_l: tibia_proximal_l (0.0065168 -0.074829 0.017341)
      PathWrap pathwrap_: wrap_object=Med_Lig_l method=hybrid
    Blankevoort1991Ligament MCLs5_l: linear_stiffness=500 slack_length=0.0781376
      PathPoint MCLs5-P1_l: femur_distal_l (0.0025007 0.011534 0.040624)
      PathPoint MCLs5-P2_l: tibia_proximal_l (0.011919 -0.065762 0.016444)
      PathWrap pathwrap_: wrap_object=Med_Lig_l method=hybrid
    Blankevoort1991Ligament MCLs6_l: linear_stiffness=500 slack_length=0.0741086
      PathPoint MCLs6-P1_l: femur_distal_l (0.00092052 0.013423 0.040266)
      PathPoint MCLs6-P2_l: tibia_proximal_l (0.0071679 -0.06075 0.019481)
      PathWrap pathwrap_: wrap_object=Med_Lig_l method=hybrid
    Blankevoort1991Ligament ACLpl1_l: linear_stiffness=820 slack_length=0.02249775
      PathPoint ACLpl1-P1_l: femur_distal_l (-0.0038361 -3.0877e-5 -0.0070808)
      PathPoint ACLpl1-P2_l: tibia_proximal_l (0.010136 -0.020482 0.00036186)
    Blankevoort1991Ligament ACLpl2_l: linear_stiffness=820 slack_length=0.02059895
      PathPoint ACLpl2-P1_l: femur_distal_l (-0.0038641 -0.0030479 -0.0072371)
      PathPoint ACLpl2-P2_l: tibia_proximal_l (0.010071 -0.021322 -0.0039158)
    Blankevoort1991Ligament ACLpl3_l: linear_stiffness=820 slack_length=0.02502492
      PathPoint ACLpl3-P1_l: femur_distal_l (-0.0012585 -0.00061438 -0.005778)
      PathPoint ACLpl3-P2_l: tibia_proximal_l (0.014123 -0.021793 -0.0014326)
    Blankevoort1991Ligament ACLpl4_l: linear_stiffness=820 slack_length=0.02270751
      PathPoint ACLpl4-P1_l: femur_distal_l (-0.00049734 -0.0048442 -0.0061921)
      PathPoint ACLpl4-P2_l: tibia_proximal_l (0.014311 -0.021465 -0.0048355)
    Blankevoort1991Ligament ACLpl5_l: linear_stiffness=820 slack_length=0.0219167
      PathPoint ACLpl5-P1_l: femur_distal_l (-0.0015255 -0.0021886 -0.0062745)
      PathPoint ACLpl5-P2_l: tibia_proximal_l (0.012201 -0.021304 -0.0017124)
    Blankevoort1991Ligament ACLpl6_l: linear_stiffness=820 slack_length=0.02249596
      PathPoint ACLpl6-P1_l: femur_distal_l (-0.0027392 -0.0031662 -0.0068024)
      PathPoint ACLpl6-P2_l: tibia_proximal_l (0.012531 -0.021976 -0.0043276)
    Blankevoort1991Ligament ACLam1_l: linear_stiffness=820 slack_length=0.03061722
      PathPoint ACLam1-P1_l: femur_distal_l (0.0011685 0.0031897 -0.002616)
      PathPoint ACLam1-P2_l: tibia_proximal_l (0.016437 -0.020666 0.0052185)
    Blankevoort1991Ligament ACLam2_l: linear_stiffness=820 slack_length=0.02683395
      PathPoint ACLam2-P1_l: femur_distal_l (-0.0011691 0.0010628 -0.0052107)
      PathPoint ACLam2-P2_l: tibia_proximal_l (0.014972 -0.021642 0.00057088)
    Blankevoort1991Ligament ACLam3_l: linear_stiffness=820 slack_length=0.02709163
      PathPoint ACLam3-P1_l: femur_distal_l (-0.0009364 0.0036972 -0.0041682)
      PathPoint ACLam3-P2_l: tibia_proximal_l (0.011939 -0.019622 0.0038468)
    Blankevoort1991Ligament ACLam4_l: linear_stiffness=820 slack_length=0.03098592
      PathPoint ACLam4-P1_l: femur_distal_l (0.00084902 0.0010256 -0.0040526)
      PathPoint ACLam4-P2_l: tibia_proximal_l (0.018517 -0.022158 0.001854)
    Blankevoort1991Ligament ACLam5_l: linear_stiffness=820 slack_length=0.0303046
      PathPoint ACLam5-P1_l: femur_distal_l (0.00056465 0.0025467 -0.003565)
      PathPoint ACLam5-P2_l: tibia_proximal_l (0.016132 -0.02093 0.0036845)
    Blankevoort1991Ligament ACLam6_l: linear_stiffness=820 slack_length=0.03009467
      PathPoint ACLam6-P1_l: femur_distal_l (-0.00057334 0.0017233 -0.0046087)
      PathPoint ACLam6-P2_l: tibia_proximal_l (0.016387 -0.02174 0.0013455)
    Blankevoort1991Ligament PCLal1_l: linear_stiffness=900 slack_length=0.0341994
      PathPoint PCLal1-P1_l: femur_distal_l (0.0010633 -0.0026457 0.010709)
      PathPoint PCLal1-P2_l: tibia_proximal_l (-0.014049 -0.03139 -0.0029368)
    Blankevoort1991Ligament PCLal2_l: linear_stiffness=900 slack_length=0.0312481
      PathPoint PCLal2-P1_l: femur_distal_l (0.0071112 -0.00473 0.0046475)
      PathPoint PCLal2-P2_l: tibia_proximal_l (-0.010099 -0.02566 -0.00288)
    Blankevoort1991Ligament PCLal3_l: linear_stiffness=900 slack_length=0.0325487
      PathPoint PCLal3-P1_l: femur_distal_l (0.0046634 -0.00088757 0.0070401)
      PathPoint PCLal3-P2_l: tibia_proximal_l (-0.012055 -0.028137 -0.0030545)
    Blankevoort1991Ligament PCLal4_l: linear_stiffness=900 slack_length=0.0334415
      PathPoint PCLal4-P1_l: femur_distal_l (0.0048125 -0.0045282 0.00815)
      PathPoint PCLal4-P2_l: tibia_proximal_l (-0.012695 -0.030786 0.0022615)
    Blankevoort1991Ligament PCLal5_l: linear_stiffness=900 slack_length=0.0333917
      PathPoint PCLal5-P1_l: femur_distal_l (0.0050176 -0.0034313 0.0075544)
      PathPoint PCLal5-P2_l: tibia_proximal_l (-0.01241 -0.029808 -0.00089554)
    Blankevoort1991Ligament PCLpm1_l: linear_stiffness=300 slack_length=0.0343383
      PathPoint PCLpm1-P1_l: femur_distal_l (0.0045535 -0.0054955 0.0090256)
      PathPoint PCLpm1-P2_l: tibia_proximal_l (-0.013917 -0.031775 0.0033347)
    Blankevoort1991Ligament PCLpm2_l: linear_stiffness=300 slack_length=0.035726
      PathPoint PCLpm2-P1_l: femur_distal_l (0.0022125 -0.008266 0.010651)
      PathPoint PCLpm2-P2_l: tibia_proximal_l (-0.017052 -0.032778 0.0065962)
    Blankevoort1991Ligament PCLpm3_l: linear_stiffness=300 slack_length=0.0306005
      PathPoint PCLpm3-P1_l: femur_distal_l (0.0018148 -0.0061646 0.010734)
      PathPoint PCLpm3-P2_l: tibia_proximal_l (-0.013228 -0.029616 0.0066956)
    Blankevoort1991Ligament PCLpm4_l: linear_stiffness=300 slack_length=0.0396514
      PathPoint PCLpm4-P1_l: femur_distal_l (0.0065082 -0.0078452 0.0080514)
      PathPoint PCLpm4-P2_l: tibia_proximal_l (-0.016262 -0.033443 0.0014326)
    Blankevoort1991Ligament PCLpm5_l: linear_stiffness=300 slack_length=0.0350972
      PathPoint PCLpm5-P1_l: femur_distal_l (0.0048766 -0.0078242 0.0097349)
      PathPoint PCLpm5-P2_l: tibia_proximal_l (-0.014784 -0.032047 0.0047864)
    Blankevoort1991Ligament LCL1_l: linear_stiffness=600 slack_length=0.0491649
      PathPoint LCL1-P1_l: femur_distal_l (-0.0021714 0.0020776 -0.035465)
      PathPoint LCL1-P2_l: tibia_proximal_l (-0.013217 -0.048269 -0.043157)
    Blankevoort1991Ligament LCL2_l: linear_stiffness=600 slack_length=0.0557048
      PathPoint LCL2-P1_l: femur_distal_l (-0.0021909 0.006045 -0.035642)
      PathPoint LCL2-P2_l: tibia_proximal_l (-0.014842 -0.050771 -0.045564)
    Blankevoort1991Ligament LCL3_l: linear_stiffness=600 slack_length=0.0532967
      PathPoint LCL3-P1_l: femur_distal_l (-0.000376 0.0039832 -0.036523)
      PathPoint LCL3-P2_l: tibia_proximal_l (-0.011881 -0.050605 -0.045433)
    Blankevoort1991Ligament LCL4_l: linear_stiffness=600 slack_length=0.0581642
      PathPoint LCL4-P1_l: femur_distal_l (-3.0505e-5 0.0065622 -0.036488)
      PathPoint LCL4-P2_l: tibia_proximal_l (-0.011705 -0.053176 -0.0463)
    Blankevoort1991Ligament PT1_l: linear_stiffness=3000 slack_length=0.0467917
      PathPoint PT1-P1_l: patella_l (0.0023888 -0.009575232 -0.01486)
      PathPoint PT1-P2_l: tibia_proximal_l (0.032815 -0.046612 -0.01998)
      PathWrap pathwrap_: wrap_object=PatTen_l method=hybrid
    Blankevoort1991Ligament PT2_l: linear_stiffness=3000 slack_length=0.0495326
      PathPoint PT2-P1_l: patella_l (0.0034486 -0.01150293 0.011925)
      PathPoint PT2-P2_l: tibia_proximal_l (0.033646 -0.049788 -0.0046861)
      PathWrap pathwrap_: wrap_object=PatTen_l method=hybrid
    Blankevoort1991Ligament PT3_l: linear_stiffness=3000 slack_length=0.0518791
      PathPoint PT3-P1_l: patella_l (0.0061702 -0.008735332 -0.0034073)
      PathPoint PT3-P2_l: tibia_proximal_l (0.037044 -0.050068 -0.014577)
      PathWrap pathwrap_: wrap_object=PatTen_l method=hybrid
    Blankevoort1991Ligament PT4_l: linear_stiffness=3000 slack_length=0.0406492
      PathPoint PT4-P1_l: patella_l (0.0028259 -0.01642144 -0.0032342)
      PathPoint PT4-P2_l: tibia_proximal_l (0.034705 -0.046151 -0.013008)
      PathWrap pathwrap_: wrap_object=PatTen_l method=hybrid
    Blankevoort1991Ligament PT5_l: linear_stiffness=3000 slack_length=0.0459407
      PathPoint PT5-P1_l: patella_l (0.0032667 -0.01249393 -0.010452)
      PathPoint PT5-P2_l: tibia_proximal_l (0.035086 -0.048114 -0.017907)
      PathWrap pathwrap_: wrap_object=PatTen_l method=hybrid
    Blankevoort1991Ligament PT6_l: linear_stiffness=3000 slack_length=0.046737
      PathPoint PT6-P1_l: patella_l (0.0058293 -0.01270133 0.0037896)
      PathPoint PT6-P2_l: tibia_proximal_l (0.035954 -0.048374 -0.0099597)
      PathWrap pathwrap_: wrap_object=PatTen_l method=hybrid
    Blankevoort1991Ligament lPFL1_l: linear_stiffness=150 slack_length=0.0341366
      PathPoint lPFL1-P1_l: femur_distal_l (0.02 0.01 -0.035456)
      PathPoint lPFL1-P2_l: patella_l (-0.0015501 0.01082177 -0.018582)
    Blankevoort1991Ligament lPFL2_l: linear_stiffness=150 slack_length=0.0365893
      PathPoint lPFL2-P1_l: femur_distal_l (0.023 0.0005 -0.0344)
      PathPoint lPFL2-P2_l: patella_l (-0.00011041 -0.008670132 -0.017223)
    Blankevoort1991Ligament lPFL3_l: linear_stiffness=150 slack_length=0.0337325
      PathPoint lPFL3-P1_l: femur_distal_l (0.017602 0.0055075 -0.036008)
      PathPoint lPFL3-P2_l: patella_l (-0.0030893 0.002456768 -0.021373)
    Blankevoort1991Ligament lPFL4_l: linear_stiffness=150 slack_length=0.0329245
      PathPoint lPFL4-P1_l: femur_distal_l (0.025 0.0070288 -0.033883)
      PathPoint lPFL4-P2_l: patella_l (0.00092173 0.004008768 -0.021066)
    Blankevoort1991Ligament lPFL5_l: linear_stiffness=150 slack_length=0.0329245
      PathPoint lPFL5-P1_l: femur_distal_l (0.019 0.008 -0.035591)
      PathPoint lPFL5-P2_l: patella_l (-0.0025654 0.006071768 -0.021187)
    Blankevoort1991Ligament lPFL6_l: linear_stiffness=150 slack_length=0.0331547
      PathPoint lPFL6-P1_l: femur_distal_l (0.019 0.003 -0.035537)
      PathPoint lPFL6-P2_l: patella_l (-0.0024546 -0.004656232 -0.020621)
    Blankevoort1991Ligament lPFL7_l: linear_stiffness=150 slack_length=0.033461
      PathPoint lPFL7-P1_l: femur_distal_l (0.023 0.0095 -0.034)
      PathPoint lPFL7-P2_l: patella_l (-0.00087067 0.007909768 -0.020645)
    Blankevoort1991Ligament lPFL8_l: linear_stiffness=150 slack_length=0.0336122
      PathPoint lPFL8-P1_l: femur_distal_l (0.0235 0.0042486 -0.035)
      PathPoint lPFL8-P2_l: patella_l (-5.8994e-5 -0.0008052324 -0.021541)
    Blankevoort1991Ligament mPFL1_l: linear_stiffness=150 slack_length=0.0471758
      PathPoint mPFL1-P1_l: femur_distal_l (0.01482 0.014851 0.037847)
      PathPoint mPFL1-P2_l: patella_l (0.00022401 0.007770768 0.018839)
    Blankevoort1991Ligament mPFL2_l: linear_stiffness=150 slack_length=0.0488893
      PathPoint mPFL2-P1_l: femur_distal_l (0.014175 0.0056463 0.039555)
      PathPoint mPFL2-P2_l: patella_l (0.00109 -0.009672032 0.016379)
    Blankevoort1991Ligament mPFL3_l: linear_stiffness=150 slack_length=0.0479773
      PathPoint mPFL3-P1_l: femur_distal_l (0.011384 0.010327 0.040161)
      PathPoint mPFL3-P2_l: patella_l (0.00031179 -0.001101232 0.020734)
    Blankevoort1991Ligament mPFL4_l: linear_stiffness=150 slack_length=0.0454419
      PathPoint mPFL4-P1_l: femur_distal_l (0.018919 0.010476 0.036686)
      PathPoint mPFL4-P2_l: patella_l (0.0032401 -5.023237e-5 0.020656)
    Blankevoort1991Ligament mPFL5_l: linear_stiffness=150 slack_length=0.045825
      PathPoint mPFL5-P1_l: femur_distal_l (0.015379 0.012476 0.038367)
      PathPoint mPFL5-P2_l: patella_l (0.00088381 0.002788768 0.020659)
    Blankevoort1991Ligament mPFL6_l: linear_stiffness=150 slack_length=0.0466035
      PathPoint mPFL6-P1_l: femur_distal_l (0.014485 0.0085394 0.039286)
      PathPoint mPFL6-P2_l: patella_l (0.0016164 -0.004529232 0.02005)
    Blankevoort1991Ligament MCLp1_l: linear_stiffness=500 slack_length=0.0292445
      PathPoint MCLp1-P1_l: femur_distal_l (-0.0080573 -0.0071292 0.034763)
      PathPoint MCLp1-P2_l: tibia_proximal_l (-0.01695 -0.034752 0.024723)
      PathWrap pathwrap_: wrap_object=Med_LigP_l method=hybrid
    Blankevoort1991Ligament MCLp2_l: linear_stiffness=500 slack_length=0.029917
      PathPoint MCLp2-P1_l: femur_distal_l (-0.0055986 -0.0063413 0.03542)
      PathPoint MCLp2-P2_l: tibia_proximal_l (-0.0154 -0.034926 0.02684)
      PathWrap pathwrap_: wrap_object=Med_LigP_l method=hybrid
    Blankevoort1991Ligament MCLp3_l: linear_stiffness=500 slack_length=0.0296519
      PathPoint MCLp3-P1_l: femur_distal_l (-0.0072934 -0.0097238 0.034157)
      PathPoint MCLp3-P2_l: tibia_proximal_l (-0.015144 -0.037335 0.024747)
      PathWrap pathwrap_: wrap_object=Med_LigP_l method=hybrid
    Blankevoort1991Ligament MCLp4_l: linear_stiffness=500 slack_length=0.0305328
      PathPoint MCLp4-P1_l: femur_distal_l (-0.0046077 -0.0095908 0.034789)
      PathPoint MCLp4-P2_l: tibia_proximal_l (-0.01293 -0.037191 0.02677)
      PathWrap pathwrap_: wrap_object=Med_LigP_l method=hybrid
    Blankevoort1991Ligament MCLp5_l: linear_stiffness=500 slack_length=0.0290979
      PathPoint MCLp5-P1_l: femur_distal_l (-0.0063085 -0.0083706 0.034788)
      PathPoint MCLp5-P2_l: tibia_proximal_l (-0.015199 -0.03615 0.025692)
      PathWrap pathwrap_: wrap_object=Med_LigP_l method=hybrid
    Blankevoort1991Ligament PFL1_l: linear_stiffness=440 slack_length=0.0437786
      PathPoint PFL1-P1_r_l: femur_distal_l (-0.0017516 -0.0011259 0.034832)
      PathPoint PFL1-P2_l: tibia_proximal_l (-0.023707 -0.039486 0.036077)
    Blankevoort1991Ligament PFL2_l: linear_stiffness=440 slack_length=0.0442336
      PathPoint PFL2-P1_l: femur_distal_l (-0.0009411 -0.0064366 -0.033945)
      PathPoint PFL2-P2_l: tibia_proximal_l (-0.021428 -0.039528 -0.034615)
    Blankevoort1991Ligament PFL3_l: linear_stiffness=440 slack_length=0.0491305
      PathPoint PFL3-P1_l: femur_distal_l (0.00435 -0.0027203 -0.036774)
      PathPoint PFL3-P2_l: tibia_proximal_l (-0.023292 -0.041485 -0.038865)
    Blankevoort1991Ligament PFL4_l: linear_stiffness=440 slack_length=0.0496406
      PathPoint PFL4-P1_l: femur_distal_l (0.0035 -0.007151 -0.034517)
      PathPoint PFL4-P2_l: tibia_proximal_l (-0.021261 -0.041671 -0.038733)
    Blankevoort1991Ligament PFL5_l: linear_stiffness=440 slack_length=0.0470791
      PathPoint PFL5-P1_l: femur_distal_l (0.0017 -0.0048477 -0.03444)
      PathPoint PFL5-P2_l: tibia_proximal_l (-0.022384 -0.039633 -0.036734)
    Blankevoort1991Ligament pCAP1_l: linear_stiffness=500 slack_length=0.0529591
      PathPoint pCAP1-P1_l: femur_distal_l (-0.00965 0.016897 0.024009)
      PathPoint pCAP1-P2_l: tibia_proximal_l (-0.019173 -0.033168 0.017395)
      PathWrap pathwrap_: wrap_object=Capsule_l
    Blankevoort1991Ligament pCAP2_l: linear_stiffness=500 slack_length=0.0545571
      PathPoint pCAP2-P1_l: femur_distal_l (-0.009839 0.016583 -0.024113)
      PathPoint pCAP2-P2_l: tibia_proximal_l (-0.017485 -0.03569 -0.021412)
      PathWrap pathwrap_: wrap_object=Capsule_l
    Blankevoort1991Ligament pCAP3_l: linear_stiffness=500 slack_length=0.0691082
      PathPoint pCAP3-P1_l: femur_distal_l (-0.00965 0.016897 0.023009)
      PathPoint pCAP3-P2_l: tibia_proximal_l (-0.017476 -0.035694 -0.020413)
      PathWrap pathwrap_: wrap_object=Capsule_l
    Blankevoort1991Ligament pCAP4_l: linear_stiffness=500 slack_length=0.0650427
      PathPoint pCAP4-P1_l: femur_distal_l (-0.009839 0.016583 -0.023113)
      PathPoint pCAP4-P2_l: tibia_proximal_l (-0.01918 -0.033164 0.016395)
      PathWrap pathwrap_: wrap_object=Capsule_l
    Blankevoort1991Ligament pCAP5_l: linear_stiffness=500 slack_length=0.0529102
      PathPoint pCAP5-P1_l: femur_distal_l (-0.00965 0.016897 0.020009)
      PathPoint pCAP5-P2_l: tibia_proximal_l (-0.019206 -0.033152 0.013396)
      PathWrap pathwrap_: wrap_object=Capsule_l
    Blankevoort1991Ligament pCAP6_l: linear_stiffness=500 slack_length=0.0546061
      PathPoint pCAP6-P1_l: femur_distal_l (-0.009839 0.016583 -0.020113)
      PathPoint pCAP6-P2_l: tibia_proximal_l (-0.017453 -0.035705 -0.017413)
      PathWrap pathwrap_: wrap_object=Capsule_l
    Blankevoort1991Ligament pCAP7_l: linear_stiffness=500 slack_length=0.0528622
      PathPoint pCAP7-P1_l: femur_distal_l (-0.00965 0.016897 0.016009)
      PathPoint pCAP7-P2_l: tibia_proximal_l (-0.019237 -0.033136 0.0093957)
      PathWrap pathwrap_: wrap_object=Capsule_l
    Blankevoort1991Ligament pCAP8_l: linear_stiffness=500 slack_length=0.0546568
      PathPoint pCAP8-P1_l: femur_distal_l (-0.009839 0.016583 -0.016113)
      PathPoint pCAP8-P2_l: tibia_proximal_l (-0.01742 -0.035721 -0.013413)
      PathWrap pathwrap_: wrap_object=Capsule_l
    Blankevoort1991Ligament ITB1_l: linear_stiffness=10000 slack_length=0.5351247
      PathPoint ITB1-P1_l: pelvis (-0.08370974 0.0530268 -0.1195853)
      PathPoint ITB1-P2_l: femur_l (-0.009252184 -0.004348526 -0.0555131)
      PathPoint ITB1-P3_l: tibia_l (0.01088928 -0.03125627 -0.03488603)
    SpringGeneralizedForce knee_flex_r: coordinate=knee_flex_r stiffness=0 rest_length=0 viscosity=0.1
    SpringGeneralizedForce knee_add_r: coordinate=knee_add_r stiffness=0 rest_length=0 viscosity=6
    SpringGeneralizedForce knee_rot_r: coordinate=knee_rot_r stiffness=0 rest_length=0 viscosity=6
    SpringGeneralizedForce knee_tx_r: coordinate=knee_tx_r stiffness=0 rest_length=0 viscosity=200
    SpringGeneralizedForce knee_ty_r: coordinate=knee_ty_r stiffness=0 rest_length=0 viscosity=200
    SpringGeneralizedForce knee_tz_r: coordinate=knee_tz_r stiffness=0 rest_length=0 viscosity=200
    SpringGeneralizedForce pf_flex_r: coordinate=pf_flex_r stiffness=0 rest_length=0 viscosity=2
    SpringGeneralizedForce pf_rot_r: coordinate=pf_rot_r stiffness=0 rest_length=0 viscosity=2
    SpringGeneralizedForce pf_tilt_r: coordinate=pf_tilt_r stiffness=0 rest_length=0 viscosity=2
    SpringGeneralizedForce pf_tx_r: coordinate=pf_tx_r stiffness=0 rest_length=0 viscosity=30
    SpringGeneralizedForce pf_ty_r: coordinate=pf_ty_r stiffness=0 rest_length=0 viscosity=30
    SpringGeneralizedForce pf_tz_r: coordinate=pf_tz_r stiffness=0 rest_length=0 viscosity=30
    SpringGeneralizedForce knee_flex_l: coordinate=knee_flex_l stiffness=0 rest_length=0 viscosity=0.1
    SpringGeneralizedForce knee_add_l: coordinate=knee_add_l stiffness=0 rest_length=0 viscosity=6
    SpringGeneralizedForce knee_rot_l: coordinate=knee_rot_l stiffness=0 rest_length=0 viscosity=6
    SpringGeneralizedForce knee_tx_l: coordinate=knee_tx_l stiffness=0 rest_length=0 viscosity=200
    SpringGeneralizedForce knee_ty_l: coordinate=knee_ty_l stiffness=0 rest_length=0 viscosity=200
    SpringGeneralizedForce knee_tz_l: coordinate=knee_tz_l stiffness=0 rest_length=0 viscosity=200
    SpringGeneralizedForce pf_flex_l: coordinate=pf_flex_l stiffness=0 rest_length=0 viscosity=2
    SpringGeneralizedForce pf_rot_l: coordinate=pf_rot_l stiffness=0 rest_length=0 viscosity=2
    SpringGeneralizedForce pf_tilt_l: coordinate=pf_tilt_l stiffness=0 rest_length=0 viscosity=2
    SpringGeneralizedForce pf_tx_l: coordinate=pf_tx_l stiffness=0 rest_length=0 viscosity=30
    SpringGeneralizedForce pf_ty_l: coordinate=pf_ty_l stiffness=0 rest_length=0 viscosity=30
    SpringGeneralizedForce pf_tz_l: coordinate=pf_tz_l stiffness=0 rest_length=0 viscosity=30
    ObjectGroup hip_add_r: members=(addbrev_r addlong_r addmagDist_r addmagIsch_r addmagMid_r addmagProx_r bflh_r grac_r pect_r semimem_r semiten_r)
    ObjectGroup hip_flex_r: members=(addbrev_r addlong_r glmin1_r grac_r iliacus_r pect_r psoas_r recfem_r sart_r tfl_r)
    ObjectGroup hip_ext_r: members=(addlong_r addmagDist_r addmagIsch_r addmagMid_r addmagProx_r bflh_r glmax1_r glmax2_r glmax3_r glmed1_r glmed2_r glmed3_r glmin3_r semimem_r semiten_r)
    ObjectGroup knee_flex_r: members=(bflh_r bfsh_r gaslat_r gasmed_r grac_r sart_r semimem_r semiten_r)
    ObjectGroup ankle_df_r: members=(edl_r ehl_r pertert_r tibant_r)
    ObjectGroup everter_r: members=(edl_r perbrev_r perlong_r pertert_r)
    ObjectGroup inverter_r: members=(ehl_r fdl_r fhl_r tibant_r tibpost_r)
    ObjectGroup ankle_pf_r: members=(fdl_r fhl_r gaslat_r gasmed_r perbrev_r perlong_r soleus_r tibpost_r)
    ObjectGroup hip_exrot_r: members=(gem_r glmin3_r piri_r quadfem_r)
    ObjectGroup hip_abd_r: members=(glmax1_r glmed1_r glmed2_r glmed3_r glmin1_r glmin2_r glmin3_r piri_r sart_r tfl_r)
    ObjectGroup hip_inrot_r: members=(glmed1_r glmed2_r glmed3_r glmin1_r iliacus_r psoas_r tfl_r)
    ObjectGroup knee_ext_r: members=(recfem_r vasint_r vaslat_r vasmed_r)
    ObjectGroup knee_abd_r
    ObjectGroup hip_add_l: members=(addbrev_l addlong_l addmagDist_l addmagIsch_l addmagMid_l addmagProx_l bflh_l grac_l pect_l semimem_l semiten_l)
    ObjectGroup hip_flex_l: members=(addbrev_l addlong_l glmin1_l grac_l iliacus_l pect_l psoas_l recfem_l sart_l tfl_l)
    ObjectGroup hip_ext_l: members=(addlong_l addmagDist_l addmagIsch_l addmagMid_l addmagProx_l bflh_l glmax1_l glmax2_l glmax3_l glmed1_l glmed2_l glmed3_l glmin3_l semimem_l semiten_l)
    ObjectGroup knee_flex_l: members=(bflh_l bfsh_l gaslat_l gasmed_l grac_l sart_l semimem_l semiten_l)
    ObjectGroup ankle_df_l: members=(edl_l ehl_l pertert_l tibant_l)
    ObjectGroup everter_l: members=(edl_l perbrev_l perlong_l pertert_l)
    ObjectGroup inverter_l: members=(ehl_l fdl_l fhl_l tibant_l tibpost_l)
    ObjectGroup ankle_pf_l: members=(fdl_l fhl_l gaslat_l gasmed_l perbrev_l perlong_l soleus_l tibpost_l)
    ObjectGroup hip_exrot_l: members=(gem_l glmin3_l piri_l quadfem_l)
    ObjectGroup hip_abd_l: members=(glmax1_l glmed1_l glmed2_l glmed3_l glmin1_l glmin2_l glmin3_l piri_l sart_l tfl_l)
    ObjectGroup hip_inrot_l: members=(glmed1_l glmed2_l glmed3_l glmin1_l iliacus_l psoas_l tfl_l)
    ObjectGroup knee_ext_l: members=(recfem_l vasint_l vaslat_l vasmed_l)
    ObjectGroup knee_abd_l
  MarkerSet:
    Marker RPSIS: pelvis (-0.1715237 0.03964754 0.06496719)
    Marker LPSIS: pelvis (-0.171524 0.039648 -0.0649)
    Marker RASIS: pelvis (0.001371304 0.0005389121 0.1493598)
    Marker LASIS: pelvis (0.001371 0.000539 -0.14936)
    Marker RGTR: femur_distal_r (0.005551 0.374181 0.056171)
    Marker RLMAL: tibia_proximal_l (-0.003887 -0.394034 0.03066)
    Marker RMT2: calcn_r (0.1835023 -0.002106714 0.001664962)
    Marker RHEEL: calcn_r (-0.007508263 0.01204487 -0.01008267)
    Marker LGTR: femur_distal_l (0.005551 0.374181 -0.056171)
    Marker LLMAL: tibia_proximal_l (-0.003887 -0.394034 -0.03066)
    Marker LHEEL: calcn_l (-0.0075 0.012045 0.010083)
    Marker LMT2: calcn_l (0.183502 -0.002107 -0.001665)
    Marker RHJC: femur_distal_r (0.005551 0.374181 0.001171)
    Marker LHJC: femur_distal_l (0.005551 0.374181 -0.001171)
    Marker RKJC: tibia_proximal_r (0.006 0 0)
    Marker LKJC: tibia_proximal_l (0.006 0 0)
    Marker RAJC: talus_r (0 0.01 0)
    Marker LAJC: talus_l (0 0.01 0)
    Marker RLFE: femur_distal_r (0 0 0.04321355)
    Marker LLFE: femur_distal_l (0 0 -0.043214)
    Marker RMFE: tibia_proximal_r (0 0 -0.04646464)
    Marker LMFE: tibia_proximal_l (0 0 0.046465)
